# OpenSim document version 40600
Model Davis2026:
  gravity: 0 -9.80665 0
  length_units: meters
  force_units: N
  credits:
    Rajagopal et al. (2016), Lai et al. (2017), Uhlrich et al. (2022). Notes: P. van den Bos changed the fiber-damping from 0.01 to default of 0.1 as suggested in M. Millard (2013) "Flexing Computational Muscle: Modeling and Simulation of Musculotendon Dynamics".
  publications:
    [1] Rajagopal, A., Dembia, C.L., DeMers, M.S., Delp, D.D., Hicks, J.L., Delp, S.L. (2016) Full-body musculoskeletal model for muscle-driven simulation of human gait. IEEE Transactions on Biomedical Engineering. [2] Lai, A.K.M., Arnold, A.S., Wakeling, J.M. (2017) Why are antagonist muscles co-activated in my simulation? A musculoskeletal model for analysing human locomotor tasks. Annals of Biomedical Engineering. [3] Uhlrich, S.D., Jackson, R.W., Seth, A., Kolesar, J.A., Delp, S.L. (2022) Muscle coordination retraining inspired by musculoskeletal simulations reduces knee contact force. Scientific Reports.
  Ground
  BodySet:
    Body pelvis: mass=11.41524 [kg] mass_center=(-0.06990088 0 0) inertia=(0.1191128 0.1191128 0.05656745 0 0 0)
        meshes=(r_pelvis.vtp l_pelvis.vtp sacrum.vtp)
      WrapCylinder glmax1_at_pelvis_r: xyz_body_rotation=(-0.6 0.45 0) translation=(-0.07612967 -0.1009275 0.06871345)
          quadrant=-x radius=0.04128225 length=0.1611659
      WrapCylinder glmax2_at_pelvis_r: xyz_body_rotation=(-0.75 0.39 0) translation=(-0.07909576 -0.08461601 0.0765986)
          quadrant=all radius=0.04145228 length=0.1065611
      WrapCylinder glmax3_at_pelvis_r: xyz_body_rotation=(-0.366909 0.478876 0)
          translation=(-0.07664379 -0.08540202 0.0728678) quadrant=all radius=0.04100559 length=0.1088005
      WrapCylinder glmax4_at_pelvis_r: xyz_body_rotation=(-0.1 0 0) translation=(-0.08206185 -0.08971336 0.0765986)
          quadrant=all radius=0.04018577 length=0.1125434
      WrapCylinder glmax12_ITB_at_pelvis_r: xyz_body_rotation=(-0.799739 0.183356 0)
          translation=(-0.0706948 -0.09004571 0.04914138) quadrant=all radius=0.04134859 length=0.1605106
      WrapCylinder glmax1_at_pelvis_l: xyz_body_rotation=(0.6 -0.45 0) translation=(-0.07612967 -0.1009275 -0.06871345)
          quadrant=-x radius=0.04128225 length=0.1611659
      WrapCylinder glmax2_at_pelvis_l: xyz_body_rotation=(0.75 -0.39 0)
          translation=(-0.07909576 -0.08461601 -0.0765986) quadrant=all radius=0.04145228 length=0.1065611
      WrapCylinder glmax3_at_pelvis_l: xyz_body_rotation=(0.366909 -0.478876 0)
          translation=(-0.07664379 -0.08540202 -0.0728678) quadrant=all radius=0.04100559 length=0.1088005
      WrapCylinder glmax4_at_pelvis_l: xyz_body_rotation=(0.1 0 0) translation=(-0.08206185 -0.08971336 -0.0765986)
          quadrant=all radius=0.04018577 length=0.1125434
      WrapCylinder glmax12_ITB_at_pelvis_l: xyz_body_rotation=(0.799739 -0.183356 0)
          translation=(-0.0706948 -0.09004571 -0.04914138) quadrant=all radius=0.04134859 length=0.1605106
      WrapCylinder PS_at_brim_r: xyz_body_rotation=(-0.25 -0.27 0.1) translation=(-0.07316358 -0.0611682 0.07389512)
          quadrant=-y radius=0.05062325 length=0.1111354
      WrapCylinder PS_at_brim_l: xyz_body_rotation=(0.25 0.27 0.1) translation=(-0.07316358 -0.0611682 -0.07389512)
          quadrant=-y radius=0.05062325 length=0.1111354
      WrapCylinder IL_at_brim_r: xyz_body_rotation=(-0.32 -0.24 0.9) translation=(-0.07019749 -0.06626555 0.08515962)
          quadrant=-y radius=0.05564577 length=0.1109502
      WrapCylinder IL_at_brim_l: xyz_body_rotation=(0.32 0.24 0.9) translation=(-0.07019749 -0.06626555 -0.08515962)
          quadrant=-y radius=0.05564577 length=0.1109502
    Body femur_r: mass=9.01567 mass_center=(0 -0.188513 0) inertia=(0.1595934 0.04183517 0.1682942 0 0 0)
        meshes=r_femur.vtp
      WrapCylinder GasLat_at_condyles_r: translation=(0.0055445 -0.454649 0) quadrant=all radius=0.0288314
          length=0.11089
      WrapCylinder GasMed_at_condyles_r: translation=(0.0055445 -0.454649 0) quadrant=all radius=0.0277225
          length=0.11089
      WrapCylinder KnExt_at_fem_r: xyz_body_rotation=(-0.0623366 0.0507601 0)
          translation=(0.003979044 -0.4465895 0.002318832) quadrant=all radius=0.0277225 length=0.11089
      WrapCylinder KnExtVL_at_fem_r: xyz_body_rotation=(-0.0623366 0.0507601 0)
          translation=(0.002093914 -0.4465895 0.002318832) quadrant=all radius=0.0277225 length=0.11089
      WrapCylinder AB_at_femshaft_r: xyz_body_rotation=(1.66157 0.186644 0)
          translation=(0.01623807 -0.1248566 0.02590945) quadrant=all radius=0.01829685 length=0.077623
      WrapCylinder AL_at_femshaft_r: xyz_body_rotation=(1.77711 0.136489 0)
          translation=(0.03407949 -0.2571639 0.01675958) quadrant=all radius=0.02228889 length=0.11089
      WrapCylinder AMprox_at_femshaft_r: xyz_body_rotation=(1.61126 0.18656 0)
          translation=(0.005747418 -0.08083304 0.02816939) quadrant=all radius=0.02339779 length=0.077623
      WrapCylinder AMmid_at_femshaft_r: xyz_body_rotation=(1.61139 0.13656 0)
          translation=(0.02551856 -0.1782124 0.02282582) quadrant=all radius=0.02373046 length=0.133068
      WrapCylinder AMdist_at_femshaft_r: xyz_body_rotation=(1.71188 0.186636 0)
          translation=(0.03504845 -0.2891302 0.0103844) quadrant=all radius=0.02417402 length=0.22178
      WrapCylinder AMisch_at_condyles_r: xyz_body_rotation=(1.71115 -0.463363 0)
          translation=(-0.0251178 -0.4178679 -0.003497881) quadrant=all radius=0.044356 length=0.266136
      WrapCylinder PECT_at_femshaft_r: xyz_body_rotation=(1.81295 0.276344 0)
          translation=(0.006748466 -0.09370527 0.03375547) quadrant=all radius=0.0166335 length=0.055445
    Body tibia_r: mass=3.59361 mass_center=(0 -0.2002768 0) inertia=(0.05621511 0.005688434 0.05699588 0 0 0)
        meshes=(r_tibia.vtp r_fibula.vtp)
      WrapCylinder GasLat_at_shank_r: xyz_body_rotation=(2.96723 -0.279725 -1.47812)
          translation=(-0.007938128 -0.07938128 -0.003539976) quadrant=-y radius=0.0589996 length=0.107272
      WrapCylinder GasMed_at_shank_r: xyz_body_rotation=(2.96723 0.0279725 -1.47812)
          translation=(-0.007938128 -0.07938128 -0.003539976) quadrant=-y radius=0.06329048 length=0.107272
      WrapCylinder GR_at_condyles_r: xyz_body_rotation=(0 -0.4 0) translation=(-0.00321816 -0.0214544 0) quadrant=all
          radius=0.03861792 length=0.107272
      WrapCylinder SM_at_condyles_r: xyz_body_rotation=(0 -0.1 0) translation=(-0.00107272 -0.0214544 0) quadrant=all
          radius=0.03700884 length=0.107272
      WrapCylinder ST_at_condyles_r: xyz_body_rotation=(0 -0.2 0) translation=(-0.00214544 -0.02199076 0) quadrant=all
          radius=0.0455906 length=0.107272
      WrapCylinder BF_at_gastroc_r: translation=(-0.04183608 -0.0643632 0) quadrant=y radius=0.03110888 length=0.160908
    Body patella_r: mass=0.08355202 mass_center=(0.0018 0.0264 0) inertia=(2.781836e-6 1.270727e-5 1.270727e-5 0 0 0)
        meshes=r_patella.vtp
    Body talus_r: mass=0.09692808 mass_center=(0 0 0) inertia=(0.001211701 0.001211701 0.001211701 0 0 0)
        meshes=r_talus.vtp
    Body calcn_r: mass=1.211602 mass_center=(0.111808 0.0335424 0) inertia=(0.001696382 0.004725637 0.004967977 0 0 0)
        meshes=r_foot.vtp
    Body toes_r: mass=0.2099462 mass_center=(0.03868557 0.00670848 -0.0195664)
        inertia=(0.0001211701 0.001332871 0.001211701 0 0 0) meshes=r_bofoot.vtp
    Body femur_l: mass=9.01567 mass_center=(0 -0.188513 0) inertia=(0.1595934 0.04183517 0.1682942 0 0 0)
        meshes=l_femur.vtp
      WrapCylinder GasLat_at_condyles_l: translation=(0.0055445 -0.454649 0) quadrant=all radius=0.0288314
          length=0.11089
      WrapCylinder GasMed_at_condyles_l: translation=(0.0055445 -0.454649 0) quadrant=all radius=0.0277225
          length=0.11089
      WrapCylinder KnExt_at_fem_l: xyz_body_rotation=(0.0623366 -0.0507601 0)
          translation=(0.003979044 -0.4465895 -0.002318832) quadrant=all radius=0.0277225 length=0.11089
      WrapCylinder KnExtVL_at_fem_l: xyz_body_rotation=(0.0623366 -0.0507601 0)
          translation=(0.002093914 -0.4465895 -0.002318832) quadrant=all radius=0.0277225 length=0.11089
      WrapCylinder AB_at_femshaft_l: xyz_body_rotation=(-1.66157 -0.186644 0)
          translation=(0.01623807 -0.1248566 -0.02590945) quadrant=all radius=0.01829685 length=0.077623
      WrapCylinder AL_at_femshaft_l: xyz_body_rotation=(-1.77711 -0.136489 0)
          translation=(0.03407949 -0.2571639 -0.01675958) quadrant=all radius=0.02228889 length=0.11089
      WrapCylinder AMprox_at_femshaft_l: xyz_body_rotation=(-1.61126 -0.18656 0)
          translation=(0.005747418 -0.08083304 -0.02816939) quadrant=all radius=0.02339779 length=0.077623
      WrapCylinder AMmid_at_femshaft_l: xyz_body_rotation=(-1.61139 -0.13656 0)
          translation=(0.02551856 -0.1782124 -0.02282582) quadrant=all radius=0.02373046 length=0.133068
      WrapCylinder AMdist_at_femshaft_l: xyz_body_rotation=(-1.71188 -0.186636 0)
          translation=(0.03504845 -0.2891302 -0.0103844) quadrant=all radius=0.02417402 length=0.22178
      WrapCylinder AMisch_at_condyles_l: xyz_body_rotation=(-1.71115 0.463363 0)
          translation=(-0.0251178 -0.4178679 0.003497881) quadrant=all radius=0.044356 length=0.266136
      WrapCylinder PECT_at_femshaft_l: xyz_body_rotation=(-1.81295 -0.276344 0)
          translation=(0.006748466 -0.09370527 -0.03375547) quadrant=all radius=0.0166335 length=0.055445
    Body tibia_l: mass=3.59361 mass_center=(0 -0.2002768 0) inertia=(0.05621511 0.005688434 0.05699588 0 0 0)
        meshes=(l_tibia.vtp l_fibula.vtp)
      WrapCylinder GasLat_at_shank_l: xyz_body_rotation=(-2.96723 0.279725 -1.47812)
          translation=(-0.007938128 -0.07938128 0.003539976) quadrant=-y radius=0.0589996 length=0.107272
      WrapCylinder GasMed_at_shank_l: xyz_body_rotation=(-2.96723 -0.0279725 -1.47812)
          translation=(-0.007938128 -0.07938128 0.003539976) quadrant=-y radius=0.06329048 length=0.107272
      WrapCylinder GR_at_condyles_l: xyz_body_rotation=(0 0.4 0) translation=(-0.00321816 -0.0214544 0) quadrant=all
          radius=0.03861792 length=0.107272
      WrapCylinder SM_at_condyles_l: xyz_body_rotation=(0 0.1 0) translation=(-0.00107272 -0.0214544 0) quadrant=all
          radius=0.03700884 length=0.107272
      WrapCylinder ST_at_condyles_l: xyz_body_rotation=(0 0.2 0) translation=(-0.00214544 -0.02199076 0) quadrant=all
          radius=0.0455906 length=0.107272
      WrapCylinder BF_at_gastroc_l: translation=(-0.04183608 -0.0643632 0) quadrant=all radius=0.03110888
          length=0.160908
    Body patella_l: mass=0.08355202 mass_center=(0.0018 0.0264 0) inertia=(2.781836e-6 1.270727e-5 1.270727e-5 0 0 0)
        meshes=l_patella.vtp
    Body talus_l: mass=0.09692808 mass_center=(0 0 0) inertia=(0.001211701 0.001211701 0.001211701 0 0 0)
        meshes=l_talus.vtp
    Body calcn_l: mass=1.211602 mass_center=(0.111808 0.0335424 0) inertia=(0.001696382 0.004725637 0.004967977 0 0 0)
        meshes=l_foot.vtp
    Body toes_l: mass=0.2099462 mass_center=(0.03868557 0.00670848 0.0195664)
        inertia=(0.0001211701 0.001332871 0.001211701 0 0 0) meshes=l_bofoot.vtp
    Body torso: mass=26.00252 mass_center=(0.002693191 0.3172752 0.009734224)
        inertia=(1.404969 0.7198741 1.363902 0 0 0) meshes=(hat_spine.vtp hat_jaw.vtp hat_skull.vtp hat_ribs_scap.vtp)
    Body humerus_r: mass=1.970062 mass_center=(0 -0.1819096 0) inertia=(0.01415927 0.004884508 0.01589332 0 0 0)
        meshes=humerus_rv.vtp
    Body ulna_r: mass=0.588838 mass_center=(0 -0.134201 0) inertia=(0.003559522 0.0007426686 0.003861156 0 0 0)
        meshes=ulna_rv.vtp
    Body radius_r: mass=0.588838 mass_center=(0 -0.134201 0) inertia=(0.003559522 0.0007426686 0.003861156 0 0 0)
        meshes=radius_rv.vtp
    Body hand_r: mass=0.443446 mass_center=(0 -0.07582174 0) inertia=(0.001071943 0.000657346 0.001610317 0 0 0)
        meshes=(pisiform_rvs.vtp lunate_rvs.vtp scaphoid_rvs.vtp triquetrum_rvs.vtp hamate_rvs.vtp capitate_rvs.vtp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)
    Body humerus_l: mass=1.970062 mass_center=(0 -0.1819096 0) inertia=(0.01415927 0.004884508 0.01589332 0 0 0)
        meshes=humerus_lv.vtp
    Body ulna_l: mass=0.588838 mass_center=(0 -0.134201 0) inertia=(0.003559522 0.0007426686 0.003861156 0 0 0)
        meshes=ulna_lv.vtp
    Body radius_l: mass=0.588838 mass_center=(0 -0.134201 0) inertia=(0.003559522 0.0007426686 0.003861156 0 0 0)
        meshes=radius_lv.vtp
    Body hand_l: mass=0.443446 mass_center=(0 -0.07582174 0) inertia=(0.001071943 0.000657346 0.001610317 0 0 0)
        meshes=(pisiform_lvs.vtp lunate_lvs.vtp scaphoid_lvs.vtp triquetrum_lvs.vtp hamate_lvs.vtp capitate_lvs.vtp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)
  JointSet:
    CustomJoint ground_pelvis: socket_parent_frame=ground_offset socket_child_frame=pelvis_offset
      Coordinate pelvis_tilt: default_value=0 range=(-1.570796 1.570796) clamped=true
      Coordinate pelvis_list: default_value=0 range=(-1.570796 1.570796) clamped=true
      Coordinate pelvis_rotation: default_value=0 range=(-1.570796 1.570796) clamped=true
      Coordinate pelvis_tx: default_value=0 range=(-5 5) clamped=true
      Coordinate pelvis_ty: default_value=0.94 range=(-1 2) clamped=true
      Coordinate pelvis_tz: default_value=0 range=(-3 3) clamped=true
      PhysicalOffsetFrame ground_offset: socket_parent=/ground translation=(0 0 0) [meters]
      PhysicalOffsetFrame pelvis_offset: socket_parent=/bodyset/pelvis translation=(0 0 0)
      SpatialTransform:
        TransformAxis rotation1: coordinates=pelvis_tilt axis=(0 0 1) LinearFunction(coefficients=1 0)
        TransformAxis rotation2: coordinates=pelvis_list axis=(1 0 0) LinearFunction(coefficients=1 0)
        TransformAxis rotation3: coordinates=pelvis_rotation axis=(0 1 0) LinearFunction(coefficients=1 0)
        TransformAxis translation1: coordinates=pelvis_tx axis=(1 0 0) LinearFunction(coefficients=1 0)
        TransformAxis translation2: coordinates=pelvis_ty axis=(0 1 0) LinearFunction(coefficients=1 0)
        TransformAxis translation3: coordinates=pelvis_tz axis=(0 0 1) LinearFunction(coefficients=1 0)
    CustomJoint hip_r: socket_parent_frame=pelvis_offset socket_child_frame=femur_r_offset
      Coordinate hip_flexion_r: default_value=0 range=(-0.5235988 2.094395) clamped=true
      Coordinate hip_adduction_r: default_value=0 range=(-0.8726646 0.5235988) clamped=true
      Coordinate hip_rotation_r: default_value=0 range=(-0.6981317 0.6981317) clamped=true
      PhysicalOffsetFrame pelvis_offset: socket_parent=/bodyset/pelvis translation=(-0.05563991 -0.0800182 0.08702953)
      PhysicalOffsetFrame femur_r_offset: socket_parent=/bodyset/femur_r translation=(0 0 0)
      SpatialTransform: axes_held_at_zero=(translation1 translation2 translation3)
        TransformAxis rotation1: coordinates=hip_flexion_r axis=(0 0 1) LinearFunction(coefficients=1 0)
        TransformAxis rotation2: coordinates=hip_adduction_r axis=(1 0 0) LinearFunction(coefficients=1 0)
        TransformAxis rotation3: coordinates=hip_rotation_r axis=(0 1 0) LinearFunction(coefficients=1 0)
    CustomJoint walker_knee_r: socket_parent_frame=femur_r_offset socket_child_frame=tibia_r_offset
      Coordinate knee_angle_r: default_value=0 range=(0 2.443461) clamped=true
      PhysicalOffsetFrame femur_r_offset: socket_parent=/bodyset/femur_r
          translation=(-0.00499005 -0.4542054 -0.001940575) orientation=(-1.64157 1.44618 1.5708) [radians]
      PhysicalOffsetFrame tibia_r_offset: socket_parent=/bodyset/tibia_r
          translation=(-0.008677811 -0.003791851 -0.00159271) orientation=(-1.64157 1.44618 1.5708)
      SpatialTransform:
        TransformAxis rotation1: coordinates=knee_angle_r axis=(1 0 0) LinearFunction(coefficients=1 0)
        TransformAxis rotation2: coordinates=knee_angle_r axis=(0 0 1)
          PolynomialFunction: coefficients=(0.01083209 -0.02521833 -0.03284781 0.07910001 -1.473252e-8)
        TransformAxis rotation3: coordinates=knee_angle_r axis=(0 1 0)
          PolynomialFunction: coefficients=(0.02516576 -0.1694801 0.3694993 -4.430358e-8)
        TransformAxis translation1: coordinates=knee_angle_r axis=(1 0 0)
          MultiplierFunction: scale=1.1089
            PolynomialFunction: coefficients=(0.0001590448 -0.00101515 0.001817511 2.641427e-5 -7.746564e-7)
        TransformAxis translation2: coordinates=knee_angle_r axis=(0 1 0)
          MultiplierFunction: scale=1.1089
            PolynomialFunction: coefficients=(-0.0005796878 0.005079766 -0.01144238 0.003936909 -2.51635e-5)
        TransformAxis translation3: coordinates=knee_angle_r axis=(0 0 1)
          MultiplierFunction: scale=1.1089
            PolynomialFunction: coefficients=(0.001208087 -0.004453611 0.0006116494 0.00626543 -1.461913e-5)
    CustomJoint patellofemoral_r: socket_parent_frame=femur_r_offset socket_child_frame=patella_r_offset
      Coordinate knee_angle_r_beta: default_value=0 range=(-99999.9 99999.9) clamped=false
      PhysicalOffsetFrame femur_r_offset: socket_parent=/bodyset/femur_r
          translation=(-0.008971001 -0.4523868 -0.003049475)
      PhysicalOffsetFrame patella_r_offset: socket_parent=/bodyset/patella_r translation=(0 0 0)
      SpatialTransform: axes_held_at_zero=(rotation2 rotation3)
        TransformAxis rotation1: coordinates=knee_angle_r_beta axis=(0 0 1)
          SimmSpline: x=(0 0.174533 0.349066 0.523599 0.698132 0.872665 1.0472 1.22173 1.39626 1.5708 1.74533 1.91986 2.0944)
              y=(0.00113686 -0.00629212 -0.105582 -0.253683 -0.414245 -0.579047 -0.747244 -0.91799 -1.09044 -1.26379 -1.43763 -1.61186 -1.78634)
        TransformAxis translation1: coordinates=knee_angle_r_beta axis=(1 0 0)
          MultiplierFunction: scale=1.1089
            SimmSpline: x=(0 0.174533 0.349066 0.523599 0.698132 0.872665 1.0472 1.22173 1.39626 1.5708 1.74533 1.91986 2.0944)
                y=(0.0524 0.0488 0.0437 0.0371 0.0296 0.0216 0.0136 0.0057 -0.0019 -0.0088 -0.0148 -0.0196 -0.0227)
        TransformAxis translation2: coordinates=knee_angle_r_beta axis=(0 1 0)
          MultiplierFunction: scale=1.1089
            SimmSpline: x=(0 0.174533 0.349066 0.523599 0.698132 0.872665 1.0472 1.22173 1.39626 1.5708 1.74533 1.91986 2.0944)
                y=(-0.0108 -0.019 -0.0263 -0.0322 -0.0367 -0.0395 -0.0408 -0.0404 -0.0384 -0.0349 -0.0301 -0.0245 -0.0187)
        TransformAxis translation3: axis=(0 0 1) MultiplierFunction(scale=1.1089, Constant(value=0.00275))
    PinJoint ankle_r: socket_parent_frame=tibia_r_offset socket_child_frame=talus_r_offset
      Coordinate ankle_angle_r: default_value=0 range=(-0.8726646 0.8726646) clamped=true
      PhysicalOffsetFrame tibia_r_offset: socket_parent=/bodyset/tibia_r translation=(-0.0107272 -0.429088 0)
          orientation=(0.175895 -0.105208 0.0186622)
      PhysicalOffsetFrame talus_r_offset: socket_parent=/bodyset/talus_r translation=(0 0 0)
          orientation=(0.175895 -0.105208 0.0186622)
    CustomJoint hip_l: socket_parent_frame=pelvis_offset socket_child_frame=femur_l_offset
      Coordinate hip_flexion_l: default_value=0 range=(-0.5235988 2.094395) clamped=true
      Coordinate hip_adduction_l: default_value=0 range=(-0.8726646 0.5235988) clamped=true
      Coordinate hip_rotation_l: default_value=0 range=(-0.6981317 0.6981317) clamped=true
      PhysicalOffsetFrame pelvis_offset: socket_parent=/bodyset/pelvis translation=(-0.05563991 -0.0800182 -0.08702953)
      PhysicalOffsetFrame femur_l_offset: socket_parent=/bodyset/femur_l translation=(0 0 0)
      SpatialTransform: axes_held_at_zero=(translation1 translation2 translation3)
        TransformAxis rotation1: coordinates=hip_flexion_l axis=(0 0 1) LinearFunction(coefficients=1 0)
        TransformAxis rotation2: coordinates=hip_adduction_l axis=(1 0 0) LinearFunction(coefficients=-1 0)
        TransformAxis rotation3: coordinates=hip_rotation_l axis=(0 1 0) LinearFunction(coefficients=-1 0)
    CustomJoint walker_knee_l: socket_parent_frame=femur_l_offset socket_child_frame=tibia_l_offset
      Coordinate knee_angle_l: default_value=0 range=(0 2.443461) clamped=true
      PhysicalOffsetFrame femur_l_offset: socket_parent=/bodyset/femur_l
          translation=(-0.00499005 -0.4542054 0.001940575) orientation=(1.64157 -1.44618 1.5708)
      PhysicalOffsetFrame tibia_l_offset: socket_parent=/bodyset/tibia_l
          translation=(-0.008677811 -0.003791851 0.00159271) orientation=(1.64157 -1.44618 1.5708)
      SpatialTransform:
        TransformAxis rotation1: coordinates=knee_angle_l axis=(-1 0 0) LinearFunction(coefficients=1 0)
        TransformAxis rotation2: coordinates=knee_angle_l axis=(0 0 1)
          PolynomialFunction: coefficients=(0.01083209 -0.02521833 -0.03284781 0.07910001 -1.473252e-8)
        TransformAxis rotation3: coordinates=knee_angle_l axis=(0 1 0)
          PolynomialFunction: coefficients=(-0.02516576 0.1694801 -0.3694993 4.430358e-8)
        TransformAxis translation1: coordinates=knee_angle_l axis=(1 0 0)
          MultiplierFunction: scale=1.1089
            PolynomialFunction: coefficients=(0.0001590448 -0.00101515 0.001817511 2.641427e-5 -7.746564e-7)
        TransformAxis translation2: coordinates=knee_angle_l axis=(0 1 0)
          MultiplierFunction: scale=1.1089
            PolynomialFunction: coefficients=(-0.0005796878 0.005079766 -0.01144238 0.003936909 -2.51635e-5)
        TransformAxis translation3: coordinates=knee_angle_l axis=(0 0 1)
          MultiplierFunction: scale=1.1089
            PolynomialFunction: coefficients=(-0.001208087 0.004453611 -0.0006116494 -0.00626543 1.461913e-5)
    CustomJoint patellofemoral_l: socket_parent_frame=femur_l_offset socket_child_frame=patella_l_offset
      Coordinate knee_angle_l_beta: default_value=0 range=(-99999.9 99999.9) clamped=false
      PhysicalOffsetFrame femur_l_offset: socket_parent=/bodyset/femur_l
          translation=(-0.008971001 -0.4523868 0.003049475)
      PhysicalOffsetFrame patella_l_offset: socket_parent=/bodyset/patella_l translation=(0 0 0)
      SpatialTransform: axes_held_at_zero=(rotation2 rotation3)
        TransformAxis rotation1: coordinates=knee_angle_l_beta axis=(0 0 1)
          SimmSpline: x=(0 0.174533 0.349066 0.523599 0.698132 0.872665 1.0472 1.22173 1.39626 1.5708 1.74533 1.91986 2.0944)
              y=(0.00113686 -0.00629212 -0.105582 -0.253683 -0.414245 -0.579047 -0.747244 -0.91799 -1.09044 -1.26379 -1.43763 -1.61186 -1.78634)
        TransformAxis translation1: coordinates=knee_angle_l_beta axis=(1 0 0)
          MultiplierFunction: scale=1.1089
            SimmSpline: x=(0 0.174533 0.349066 0.523599 0.698132 0.872665 1.0472 1.22173 1.39626 1.5708 1.74533 1.91986 2.0944)
                y=(0.0524 0.0488 0.0437 0.0371 0.0296 0.0216 0.0136 0.0057 -0.0019 -0.0088 -0.0148 -0.0196 -0.0227)
        TransformAxis translation2: coordinates=knee_angle_l_beta axis=(0 1 0)
          MultiplierFunction: scale=1.1089
            SimmSpline: x=(0 0.174533 0.349066 0.523599 0.698132 0.872665 1.0472 1.22173 1.39626 1.5708 1.74533 1.91986 2.0944)
                y=(-0.0108 -0.019 -0.0263 -0.0322 -0.0367 -0.0395 -0.0408 -0.0404 -0.0384 -0.0349 -0.0301 -0.0245 -0.0187)
        TransformAxis translation3: axis=(0 0 1) MultiplierFunction(scale=1.1089, Constant(value=-0.00275))
    PinJoint ankle_l: socket_parent_frame=tibia_l_offset socket_child_frame=talus_l_offset
      Coordinate ankle_angle_l: default_value=0 range=(-0.8726646 0.8726646) clamped=true
      PhysicalOffsetFrame tibia_l_offset: socket_parent=/bodyset/tibia_l translation=(-0.0107272 -0.429088 0)
          orientation=(-0.175895 0.105208 0.0186622)
      PhysicalOffsetFrame talus_l_offset: socket_parent=/bodyset/talus_l translation=(0 0 0)
          orientation=(-0.175895 0.105208 0.0186622)
    CustomJoint back: socket_parent_frame=pelvis_offset socket_child_frame=torso_offset
      Coordinate lumbar_extension: default_value=0 range=(-1.570796 1.570796) clamped=true
      Coordinate lumbar_bending: default_value=0 range=(-1.570796 1.570796) clamped=true
      Coordinate lumbar_rotation: default_value=0 range=(-1.570796 1.570796) clamped=true
      PhysicalOffsetFrame pelvis_offset: socket_parent=/bodyset/pelvis translation=(-0.09956179 0.08308681 0)
      PhysicalOffsetFrame torso_offset: socket_parent=/bodyset/torso translation=(0 0 0)
      SpatialTransform: axes_held_at_zero=(translation1 translation2 translation3)
        TransformAxis rotation1: coordinates=lumbar_extension axis=(0 0 1) LinearFunction(coefficients=1 0)
        TransformAxis rotation2: coordinates=lumbar_bending axis=(1 0 0) LinearFunction(coefficients=1 0)
        TransformAxis rotation3: coordinates=lumbar_rotation axis=(0 1 0) LinearFunction(coefficients=1 0)
    CustomJoint acromial_r: socket_parent_frame=torso_offset socket_child_frame=humerus_r_offset
      Coordinate arm_flex_r: default_value=0 range=(-1.570796 1.570796) clamped=true
      Coordinate arm_add_r: default_value=0 range=(-2.094395 1.570796) clamped=true
      Coordinate arm_rot_r: default_value=0 range=(-1.570796 1.570796) clamped=true
      PhysicalOffsetFrame torso_offset: socket_parent=/bodyset/torso translation=(0.003128135 0.3683367 0.1685524)
      PhysicalOffsetFrame humerus_r_offset: socket_parent=/bodyset/humerus_r translation=(0 0 0)
      SpatialTransform: axes_held_at_zero=(translation1 translation2 translation3)
        TransformAxis rotation1: coordinates=arm_flex_r axis=(0 0 1) LinearFunction(coefficients=1 0)
        TransformAxis rotation2: coordinates=arm_add_r axis=(1 0 0) LinearFunction(coefficients=1 0)
        TransformAxis rotation3: coordinates=arm_rot_r axis=(0 1 0) LinearFunction(coefficients=1 0)
    PinJoint elbow_r: socket_parent_frame=humerus_r_offset socket_child_frame=ulna_r_offset
      Coordinate elbow_flex_r: default_value=0 range=(0 2.618) clamped=true
      PhysicalOffsetFrame humerus_r_offset: socket_parent=/bodyset/humerus_r
          translation=(0.0145349 -0.3165664 -0.01061034) orientation=(-0.0228627 0.228018 0.0051689)
      PhysicalOffsetFrame ulna_r_offset: socket_parent=/bodyset/ulna_r translation=(0 0 0)
          orientation=(-0.0228627 0.228018 0.0051689)
    PinJoint radioulnar_r: socket_parent_frame=ulna_r_offset socket_child_frame=radius_r_offset
      Coordinate pro_sup_r: default_value=0 range=(0 2.09) clamped=true
      PhysicalOffsetFrame ulna_r_offset: socket_parent=/bodyset/ulna_r translation=(-0.007490313 -0.0144829 0.02904264)
          orientation=(-1.56884 0.056428 1.53614)
      PhysicalOffsetFrame radius_r_offset: socket_parent=/bodyset/radius_r translation=(0 0 0)
          orientation=(-1.56884 0.056428 1.53614)
    CustomJoint acromial_l: socket_parent_frame=torso_offset socket_child_frame=humerus_l_offset
      Coordinate arm_flex_l: default_value=0 range=(-1.570796 1.570796) clamped=true
      Coordinate arm_add_l: default_value=0 range=(-2.094395 1.570796) clamped=true
      Coordinate arm_rot_l: default_value=0 range=(-1.570796 1.570796) clamped=true
      PhysicalOffsetFrame torso_offset: socket_parent=/bodyset/torso translation=(0.003128135 0.3683367 -0.1685524)
      PhysicalOffsetFrame humerus_l_offset: socket_parent=/bodyset/humerus_l translation=(0 0 0)
      SpatialTransform: axes_held_at_zero=(translation1 translation2 translation3)
        TransformAxis rotation1: coordinates=arm_flex_l axis=(0 0 1) LinearFunction(coefficients=1 0)
        TransformAxis rotation2: coordinates=arm_add_l axis=(-1 0 0) LinearFunction(coefficients=1 0)
        TransformAxis rotation3: coordinates=arm_rot_l axis=(0 -1 0) LinearFunction(coefficients=1 0)
    PinJoint elbow_l: socket_parent_frame=humerus_l_offset socket_child_frame=ulna_l_offset
      Coordinate elbow_flex_l: default_value=0 range=(0 2.618) clamped=true
      PhysicalOffsetFrame humerus_l_offset: socket_parent=/bodyset/humerus_l
          translation=(0.0145349 -0.3165664 0.01061034) orientation=(0.0228627 -0.228018 0.0051689)
      PhysicalOffsetFrame ulna_l_offset: socket_parent=/bodyset/ulna_l translation=(0 0 0)
          orientation=(0.0228627 -0.228018 0.0051689)
    PinJoint radioulnar_l: socket_parent_frame=ulna_l_offset socket_child_frame=radius_l_offset
      Coordinate pro_sup_l: default_value=0 range=(0 2.09) clamped=true
      PhysicalOffsetFrame ulna_l_offset: socket_parent=/bodyset/ulna_l
          translation=(-0.007490313 -0.0144829 -0.02904264) orientation=(1.56884 -0.056428 1.53614)
      PhysicalOffsetFrame radius_l_offset: socket_parent=/bodyset/radius_l translation=(0 0 0)
          orientation=(1.56884 -0.056428 1.53614)
    WeldJoint mtp_r: socket_parent_frame=calcn_r_offset socket_child_frame=toes_r_offset
      PhysicalOffsetFrame calcn_r_offset: socket_parent=/bodyset/calcn_r
          translation=(0.1999127 -0.00223616 0.001207526) orientation=(-3.14159 0.619901 0)
      PhysicalOffsetFrame toes_r_offset: socket_parent=/bodyset/toes_r translation=(0 0 0)
          orientation=(-3.14159 0.619901 0)
    WeldJoint mtp_l: socket_parent_frame=calcn_l_offset socket_child_frame=toes_l_offset
      PhysicalOffsetFrame calcn_l_offset: socket_parent=/bodyset/calcn_l
          translation=(0.1999127 -0.00223616 -0.001207526) orientation=(-3.14159 -0.619901 0)
      PhysicalOffsetFrame toes_l_offset: socket_parent=/bodyset/toes_l translation=(0 0 0)
          orientation=(-3.14159 -0.619901 0)
    WeldJoint subtalar_r: socket_parent_frame=talus_r_offset socket_child_frame=calcn_r_offset
      PhysicalOffsetFrame talus_r_offset: socket_parent=/bodyset/talus_r
          translation=(-0.05452876 -0.04690346 0.008855194) orientation=(-1.76819 0.906223 1.8196)
      PhysicalOffsetFrame calcn_r_offset: socket_parent=/bodyset/calcn_r translation=(0 0 0)
          orientation=(-1.76819 0.906223 1.8196)
    WeldJoint subtalar_l: socket_parent_frame=talus_l_offset socket_child_frame=calcn_l_offset
      PhysicalOffsetFrame talus_l_offset: socket_parent=/bodyset/talus_l
          translation=(-0.05452876 -0.04690346 -0.008855194) orientation=(1.76819 -0.906223 1.8196)
      PhysicalOffsetFrame calcn_l_offset: socket_parent=/bodyset/calcn_l translation=(0 0 0)
          orientation=(1.76819 -0.906223 1.8196)
    WeldJoint radius_hand_r: socket_parent_frame=radius_r_offset socket_child_frame=hand_r_offset
      PhysicalOffsetFrame radius_r_offset: socket_parent=/bodyset/radius_r
          translation=(-0.009795196 -0.2626019 0.01515433) orientation=(-1.5708 0 -1.5708)
      PhysicalOffsetFrame hand_r_offset: socket_parent=/bodyset/hand_r translation=(0 0 0)
          orientation=(-1.5708 0 -1.5708)
    WeldJoint radius_hand_l: socket_parent_frame=radius_l_offset socket_child_frame=hand_l_offset
      PhysicalOffsetFrame radius_l_offset: socket_parent=/bodyset/radius_l
          translation=(-0.009795196 -0.2626019 -0.01515433) orientation=(1.5708 0 1.5708)
      PhysicalOffsetFrame hand_l_offset: socket_parent=/bodyset/hand_l translation=(0 0 0)
          orientation=(1.5708 0 1.5708)
  ConstraintSet:
    CoordinateCouplerConstraint patellofemoral_knee_angle_r_con: independent_coordinate_names=knee_angle_r
        dependent_coordinate_name=knee_angle_r_beta scale_factor=1
        coupled_coordinates_function=LinearFunction(coefficients=1 0)
    CoordinateCouplerConstraint patellofemoral_knee_angle_l_con: independent_coordinate_names=knee_angle_l
        dependent_coordinate_name=knee_angle_l_beta scale_factor=1
        coupled_coordinates_function=LinearFunction(coefficients=1 0)
  ForceSet:
    CoordinateActuator lumbar_ext: min_control=-10 max_control=10 coordinate=lumbar_extension optimal_force=250
    CoordinateActuator lumbar_bend: min_control=-10 max_control=10 coordinate=lumbar_bending optimal_force=250
    CoordinateActuator lumbar_rot: min_control=-10 max_control=10 coordinate=lumbar_rotation optimal_force=250
    CoordinateActuator shoulder_flex_r: min_control=-10 max_control=10 coordinate=arm_flex_r optimal_force=250
    CoordinateActuator shoulder_add_r: min_control=-10 max_control=10 coordinate=arm_add_r optimal_force=250
    CoordinateActuator shoulder_rot_r: min_control=-10 max_control=10 coordinate=arm_rot_r optimal_force=250
    CoordinateActuator elbow_flex_r: min_control=-10 max_control=10 coordinate=elbow_flex_r optimal_force=250
    CoordinateActuator pro_sup_r: min_control=-10 max_control=10 coordinate=pro_sup_r optimal_force=250
    CoordinateActuator shoulder_flex_l: min_control=-10 max_control=10 coordinate=arm_flex_l optimal_force=250
    CoordinateActuator shoulder_add_l: min_control=-10 max_control=10 coordinate=arm_add_l optimal_force=250
    CoordinateActuator shoulder_rot_l: min_control=-10 max_control=10 coordinate=arm_rot_l optimal_force=250
    CoordinateActuator elbow_flex_l: min_control=-10 max_control=10 coordinate=elbow_flex_l optimal_force=250
    CoordinateActuator pro_sup_l: min_control=-10 max_control=10 coordinate=pro_sup_l optimal_force=250
    CoordinateActuator residual_jointset_ground_pelvis_pelvis_tilt: min_control=-3 max_control=3 coordinate=pelvis_tilt
        optimal_force=250
    CoordinateActuator residual_jointset_ground_pelvis_pelvis_list: min_control=-3 max_control=3 coordinate=pelvis_list
        optimal_force=250
    CoordinateActuator residual_jointset_ground_pelvis_pelvis_rotation: min_control=-3 max_control=3
        coordinate=pelvis_rotation optimal_force=250
    CoordinateActuator residual_jointset_ground_pelvis_pelvis_tx: min_control=-3 max_control=3 coordinate=pelvis_tx
        optimal_force=50
    CoordinateActuator residual_jointset_ground_pelvis_pelvis_ty: min_control=-3 max_control=3 coordinate=pelvis_ty
        optimal_force=50
    CoordinateActuator residual_jointset_ground_pelvis_pelvis_tz: min_control=-3 max_control=3 coordinate=pelvis_tz
        optimal_force=50
    DeGrooteFregly2016Muscle [values shared by the 86 below unless stated]: min_control=0.01 max_control=1
        max_contraction_velocity=10 activation_time_constant=0.01 deactivation_time_constant=0.04
        default_activation=0.01 active_force_width_scale=1.34 fiber_damping=0.1 tendon_strain_at_one_norm_force=0.049
        tendon_compliance_dynamics_mode=implicit
    DeGrooteFregly2016Muscle addbrev_r: max_isometric_force=625.8197 optimal_fiber_length=0.1146378
        tendon_slack_length=0.03941749 pennation_angle_at_optimal=0.1147809 [radians]
        passive_fiber_strain_at_one_norm_force=0.5059595
      PathPoint P1: pelvis (-0.01888411 -0.09583018 0.01734733)
      PathPoint P2: femur_r (-0.0022178 -0.1308502 0.02761161)
      PathWrap: wrap_object=AB_at_femshaft_r method=hybrid
    DeGrooteFregly2016Muscle addlong_r: max_isometric_force=916.8 optimal_fiber_length=0.1200942
        tendon_slack_length=0.1462878 pennation_angle_at_optimal=0.1377704
        passive_fiber_strain_at_one_norm_force=0.5013184
      PathPoint P1: pelvis (-0.007494323 -0.09063088 0.02126738)
      PathPoint P2: femur_r (0.01248621 -0.2654374 0.01755389)
      PathWrap: wrap_object=AL_at_femshaft_r method=hybrid
    DeGrooteFregly2016Muscle addmagDist_r: max_isometric_force=597.2951 optimal_fiber_length=0.199814
        tendon_slack_length=0.0985321 pennation_angle_at_optimal=0.194705
        passive_fiber_strain_at_one_norm_force=0.7000001
      PathPoint P1: pelvis (-0.07320313 -0.1301557 0.04485524)
      PathPoint P2: femur_r (0.01247513 -0.2910862 0.02140177)
      PathWrap: wrap_object=AMdist_at_femshaft_r method=hybrid
    DeGrooteFregly2016Muscle addmagIsch_r: max_isometric_force=597.2951 optimal_fiber_length=0.1750964
        tendon_slack_length=0.2425153 pennation_angle_at_optimal=0.1680443
        passive_fiber_strain_at_one_norm_force=0.7000408
      PathPoint P1: pelvis (-0.08860703 -0.1322864 0.04698423)
      PathPoint P2: femur_r (0.005333809 -0.4302199 -0.0362943)
      PathWrap: wrap_object=AMisch_at_condyles_r method=hybrid
    DeGrooteFregly2016Muscle addmagMid_r: max_isometric_force=597.2951 optimal_fiber_length=0.1561788
        tendon_slack_length=0.05288494 pennation_angle_at_optimal=0.2073076
        passive_fiber_strain_at_one_norm_force=0.7000001
      PathPoint P1: pelvis (-0.05206478 -0.123101 0.03214888)
      PathPoint P2: femur_r (0.002683538 -0.1800854 0.03240206)
      PathWrap: wrap_object=AMmid_at_femshaft_r method=hybrid
    DeGrooteFregly2016Muscle addmagProx_r: max_isometric_force=597.2951 optimal_fiber_length=0.1179096
        tendon_slack_length=0.04502462 pennation_angle_at_optimal=0.3114833
        passive_fiber_strain_at_one_norm_force=0.7000001
      PathPoint P1: pelvis (-0.03062983 -0.109644 0.01537604)
      PathPoint P2: femur_r (-0.0169329 -0.08744785 0.03550698)
      PathWrap: wrap_object=AMprox_at_femshaft_r method=hybrid
    DeGrooteFregly2016Muscle bflh_r: max_isometric_force=1313.184 optimal_fiber_length=0.1085867
        tendon_slack_length=0.369927 pennation_angle_at_optimal=0.1759182
        passive_fiber_strain_at_one_norm_force=0.7054016
      PathPoint P1: pelvis (-0.1028245 -0.1214189 0.06600997)
      PathPoint P2: tibia_r (-0.03685866 -0.03913283 0.03881101)
      PathPoint P3: tibia_r (-0.02900635 -0.05372182 0.03728775)
    DeGrooteFregly2016Muscle bfsh_r: max_isometric_force=557.1148 optimal_fiber_length=0.1217424
        tendon_slack_length=0.1167946 pennation_angle_at_optimal=0.2642232
        passive_fiber_strain_at_one_norm_force=0.6994891
      PathPoint P1: femur_r (0.0055445 -0.2340888 0.02594826)
      PathPoint P2: tibia_r (-0.03074416 -0.03522812 0.03436995)
      PathWrap: wrap_object=BF_at_gastroc_r method=hybrid
    DeGrooteFregly2016Muscle edl_r: max_isometric_force=603.4982 optimal_fiber_length=0.07553817
        tendon_slack_length=0.4020802 pennation_angle_at_optimal=0.2182582
        passive_fiber_strain_at_one_norm_force=0.7074931
      PathPoint P1: tibia_r (-0.01716352 -0.1241137 0.02199076)
      PathPoint P2: tibia_r (0.01759261 -0.4033427 0.01201446)
      PathPoint P3: calcn_r (0.1027516 0.04025088 0.000894464)
      PathPoint P4: calcn_r (0.1806817 0.00614944 0.01453504)
      PathPoint P5: toes_r (0.000335424 0.005254976 0.01710662)
      PathPoint P6: toes_r (0.04953094 -0.000447232 0.027952)
    DeGrooteFregly2016Muscle ehl_r: max_isometric_force=285.8675 optimal_fiber_length=0.08170331
        tendon_slack_length=0.3569553 pennation_angle_at_optimal=0.1972681
        passive_fiber_strain_at_one_norm_force=0.7147756
      PathPoint P1: tibia_r (-0.01501808 -0.1662716 0.02027441)
      PathPoint P2: tibia_r (0.007616312 -0.3120542 0.01759261)
      PathPoint P3: tibia_r (0.0214544 -0.3961555 -0.003003616)
      PathPoint P4: calcn_r (0.1084538 0.04349331 -0.02359149)
      PathPoint P5: calcn_r (0.1445677 0.03454867 -0.02873466)
      PathPoint P6: calcn_r (0.1938751 0.01554131 -0.03130624)
      PathPoint P7: toes_r (0.03331878 0.004584128 -0.02739296)
      PathPoint P8: toes_r (0.0629479 0.003801472 -0.02079629)
    DeGrooteFregly2016Muscle fdl_r: max_isometric_force=423.177 optimal_fiber_length=0.04883848
        tendon_slack_length=0.4147689 pennation_angle_at_optimal=0.2248391
        passive_fiber_strain_at_one_norm_force=0.6998542
      PathPoint P1: tibia_r (-0.002467256 -0.1965223 -0.001930896)
      PathPoint P2: tibia_r (-0.01887987 -0.3910064 -0.01330173)
      PathPoint P3: calcn_r (0.04874829 0.03521952 -0.03130624)
      PathPoint P4: calcn_r (0.07916006 0.01967821 -0.0294055)
      PathPoint P5: calcn_r (0.1853777 -0.009056448 0.01296973)
      PathPoint P6: toes_r (-0.002124352 -0.008721024 0.01643578)
      PathPoint P7: toes_r (0.03186528 -0.007938368 0.02403872)
      PathPoint P8: toes_r (0.04930733 -0.00670848 0.02705754)
    DeGrooteFregly2016Muscle fhl_r: max_isometric_force=907.8393 optimal_fiber_length=0.05782951
        tendon_slack_length=0.388829 pennation_angle_at_optimal=0.2580255
        passive_fiber_strain_at_one_norm_force=0.7001852
      PathPoint P1: tibia_r (-0.03325432 -0.2320293 0.0214544)
      PathPoint P2: tibia_r (-0.02595982 -0.3937955 -0.008152672)
      PathPoint P3: calcn_r (0.04181619 0.03085901 -0.02694573)
      PathPoint P4: calcn_r (0.1160567 0.007602944 -0.02862285)
      PathPoint P5: calcn_r (0.1929806 -0.005925824 -0.03007635)
      PathPoint P6: toes_r (0.01733024 -0.007155712 -0.02962912)
      PathPoint P7: toes_r (0.0628361 -0.01140442 -0.02023725)
    DeGrooteFregly2016Muscle gaslat_r: max_isometric_force=1575.059 optimal_fiber_length=0.07419734
        tendon_slack_length=0.4021711 pennation_angle_at_optimal=0.2102268
        passive_fiber_strain_at_one_norm_force=0.6636807
      PathPoint P1: femur_r (0.0022178 -0.4224909 0.02283225)
      PathPoint P2: calcn_r (0.004919552 0.03466048 -0.005925824)
      PathWrap: wrap_object=GasLat_at_shank_r method=hybrid
      PathWrap pathwrap_0: wrap_object=GasLat_at_condyles_r method=hybrid
    DeGrooteFregly2016Muscle gasmed_r: max_isometric_force=3115.515 optimal_fiber_length=0.06344801
        tendon_slack_length=0.4161759 pennation_angle_at_optimal=0.1656816
        passive_fiber_strain_at_one_norm_force=0.550636
      PathPoint P1: femur_r (0.0066534 -0.4269265 -0.0243958)
      PathPoint P2: calcn_r (0.004919552 0.03466048 -0.005925824)
      PathWrap: wrap_object=GasMed_at_shank_r method=hybrid
      PathWrap pathwrap_0: wrap_object=GasMed_at_condyles_r method=hybrid
    DeGrooteFregly2016Muscle glmax1_r: max_isometric_force=494.2332 optimal_fiber_length=0.1544452
        tendon_slack_length=0.09172154 pennation_angle_at_optimal=0.3829252 passive_fiber_strain_at_one_norm_force=0.7
      PathPoint P1: pelvis (-0.1217086 0.03517172 0.06341914)
      PathPoint P2: pelvis (-0.1242792 -0.02467117 0.08775045)
      PathPoint P3: femur_r (-0.04923516 -0.03615014 0.03348878)
      PathPoint P4: femur_r (-0.03071653 -0.06276374 0.0521183)
      PathWrap: wrap_object=glmax1_at_pelvis_r method=hybrid
    DeGrooteFregly2016Muscle glmax2_r: max_isometric_force=391.8549 optimal_fiber_length=0.1669754
        tendon_slack_length=0.1159256 pennation_angle_at_optimal=0.3829252 passive_fiber_strain_at_one_norm_force=0.7
      PathPoint P1: pelvis (-0.1302114 0.008869389 0.05204199)
      PathPoint P2: pelvis (-0.1328809 -0.06208572 0.09158038)
      PathPoint P3: femur_r (-0.0499005 -0.06475976 0.02794428)
      PathPoint P4: femur_r (-0.01729884 -0.1126642 0.04646291)
      PathWrap: wrap_object=glmax2_at_pelvis_r method=hybrid
    DeGrooteFregly2016Muscle glmax3_r: max_isometric_force=454.9471 optimal_fiber_length=0.1794644
        tendon_slack_length=0.1142536 pennation_angle_at_optimal=0.3829252 passive_fiber_strain_at_one_norm_force=0.7
      PathPoint P1: pelvis (-0.1283526 -0.03171571 0.02584076)
      PathPoint P2: pelvis (-0.1263753 -0.1060147 0.0717436)
      PathPoint P3: femur_r (-0.03499688 -0.1131965 0.02055901)
      PathPoint P4: femur_r (-0.01066762 -0.1337777 0.03974298)
      PathWrap: wrap_object=glmax3_at_pelvis_r method=hybrid
    DeGrooteFregly2016Muscle glmax4_r: max_isometric_force=211.4407 optimal_fiber_length=0.180667
        tendon_slack_length=0.1114294 pennation_angle_at_optimal=0.3829252 passive_fiber_strain_at_one_norm_force=0.7
      PathPoint P1: pelvis (-0.1285306 -0.05352218 0.01013805)
      PathPoint P2: pelvis (-0.1258611 -0.1287591 0.04900057)
      PathPoint P3: femur_r (-0.03116009 -0.1247513 0.01042366)
      PathPoint P4: femur_r (-0.0066534 -0.1573529 0.04557579)
      PathWrap: wrap_object=glmax4_at_pelvis_r method=hybrid
    DeGrooteFregly2016Muscle glmax12_ITB_r: max_isometric_force=834.4754 optimal_fiber_length=0.1663769
        tendon_slack_length=0.462158 pennation_angle_at_optimal=0.4590216 passive_fiber_strain_at_one_norm_force=0.7
        tendon_strain_at_one_norm_force=0.08707634
      PathPoint P1: pelvis (-0.1194148 0.01097969 0.06855575)
      PathPoint trochVP: femur_r (-0.06686667 -0.03049475 0.0421382)
      PathPoint P2: femur_r (-0.04695083 -0.1605576 0.04783795)
      PathPoint P3: femur_r (-0.03406541 -0.2353529 0.05906001)
      PathPoint kneeVP: femur_r (-0.008126802 -0.4469119 0.05010185)
      PathPoint P4: tibia_r (-0.003582885 -0.05589944 0.03434849)
      PathWrap pathwrap-1: wrap_object=glmax12_ITB_at_pelvis_r method=hybrid
    DeGrooteFregly2016Muscle glmax34_ITB_r: max_isometric_force=950.6323 optimal_fiber_length=0.1814346
        tendon_slack_length=0.446776 pennation_angle_at_optimal=0.4590216 passive_fiber_strain_at_one_norm_force=0.7
        tendon_strain_at_one_norm_force=0.1100756
      PathPoint P1: pelvis (-0.1502819 -0.04038121 0.01768526)
      PathPoint P2: pelvis (-0.1416111 -0.1018858 0.05564663)
      PathPoint trochVP: femur_r (-0.04601935 -0.08416551 0.0099801)
      PathPoint P3: femur_r (-0.04693974 -0.1840996 0.03359967)
      PathPoint kneeVP: femur_r (-0.01831675 -0.4468675 0.03435613)
      PathPoint P4: tibia_r (-0.01469626 -0.06940498 0.03689084)
    DeGrooteFregly2016Muscle glmed1_r: max_isometric_force=1093.467 optimal_fiber_length=0.07917273
        tendon_slack_length=0.06054385 pennation_angle_at_optimal=0.3165559
        passive_fiber_strain_at_one_norm_force=0.7000001
      PathPoint P1: pelvis (-0.04844615 0.02650622 0.1295418)
      PathPoint P2_0: femur_r (-0.0155246 -0.0199602 0.0654251)
    DeGrooteFregly2016Muscle glmed2_r: max_isometric_force=765.0917 optimal_fiber_length=0.08690504
        tendon_slack_length=0.07805935 pennation_angle_at_optimal=0.3165559
        passive_fiber_strain_at_one_norm_force=0.6904088
      PathPoint P1: pelvis (-0.08403925 0.05607085 0.0923689)
      PathPoint P2_0: femur_r (-0.0243958 -0.011089 0.0620984)
    DeGrooteFregly2016Muscle glmed3_r: max_isometric_force=871.1993 optimal_fiber_length=0.0818337
        tendon_slack_length=0.05071384 pennation_angle_at_optimal=0.3165559
        passive_fiber_strain_at_one_norm_force=0.6558113
      PathPoint P1: pelvis (-0.0988697 0.01631152 0.0720928)
      PathPoint P2_0: femur_r (-0.03426501 -0.00521183 0.05744102)
    DeGrooteFregly2016Muscle glmin1_r: max_isometric_force=374.0459 optimal_fiber_length=0.08383034
        tendon_slack_length=0.01990068 pennation_angle_at_optimal=0.1745329
        passive_fiber_strain_at_one_norm_force=0.7000001
      PathPoint P1: pelvis (-0.02966091 0 0.1329211)
      PathPoint P2: femur_r (0.0055445 -0.0166335 0.0620984)
    DeGrooteFregly2016Muscle glmin2_r: max_isometric_force=394.8197 optimal_fiber_length=0.0709732
        tendon_slack_length=0.0330795 pennation_angle_at_optimal=0 passive_fiber_strain_at_one_norm_force=0.6999804
      PathPoint P1: pelvis (-0.06090374 0.0101947 0.1137714)
      PathPoint P2: femur_r (0.0044356 -0.0099801 0.0576628)
    DeGrooteFregly2016Muscle glmin3_r: max_isometric_force=446.7738 optimal_fiber_length=0.03703025
        tendon_slack_length=0.04951354 pennation_angle_at_optimal=0.01745329
        passive_fiber_strain_at_one_norm_force=0.6990981
      PathPoint P1: pelvis (-0.07800819 -0.01580179 0.08989071)
      PathPoint P2: femur_r (-0.0044356 -0.0011089 0.0565539)
    DeGrooteFregly2016Muscle grac_r: max_isometric_force=281.3115 optimal_fiber_length=0.2534422
        tendon_slack_length=0.1913765 pennation_angle_at_optimal=0.1720016
        passive_fiber_strain_at_one_norm_force=0.7244614
      PathPoint P1: pelvis (-0.04682469 -0.1318379 0.02766561)
      PathPoint P2: tibia_r (-0.0197595 -0.05100784 -0.03176324)
      PathPoint P3: tibia_r (0.001909442 -0.07468277 -0.01687389)
      PathWrap: wrap_object=GR_at_condyles_r method=hybrid
    DeGrooteFregly2016Muscle iliacus_r: max_isometric_force=1021.141 optimal_fiber_length=0.1111174
        tendon_slack_length=0.1001941 pennation_angle_at_optimal=0.279914
        passive_fiber_strain_at_one_norm_force=0.5020882
      PathPoint P1: pelvis (-0.05981617 0.03150162 0.09495973)
      PathPoint P2: pelvis (-0.01334741 -0.05678448 0.08515962)
      PathPoint P3: femur_r (-0.00255047 -0.06265285 0.01541371)
      PathPoint P4: femur_r (-0.01352858 -0.07063693 0.02173444)
      PathWrap: wrap_object=IL_at_brim_r method=hybrid range=(2 3)
    DeGrooteFregly2016Muscle perbrev_r: max_isometric_force=521.2016 optimal_fiber_length=0.04913054
        tendon_slack_length=0.1596499 pennation_angle_at_optimal=0.2052361
        passive_fiber_strain_at_one_norm_force=0.6992207
      PathPoint P1: tibia_r (-0.0260671 -0.2716127 0.02692527)
      PathPoint P2: tibia_r (-0.03636521 -0.4176099 0.02671073)
      PathPoint P3: tibia_r (-0.03057252 -0.4295171 0.02735436)
      PathPoint P4: calcn_r (0.05266157 0.03018816 0.02605126)
      PathPoint P5: calcn_r (0.07569402 0.02448595 0.03835014)
    DeGrooteFregly2016Muscle perlong_r: max_isometric_force=1115.371 optimal_fiber_length=0.0552083
        tendon_slack_length=0.3610501 pennation_angle_at_optimal=0.2479525
        passive_fiber_strain_at_one_norm_force=0.6966414
      PathPoint P1: tibia_r (-0.0214544 -0.1472845 0.0302507)
      PathPoint P2: tibia_r (-0.03400522 -0.4183608 0.02542346)
      PathPoint P3: tibia_r (-0.02917798 -0.4305898 0.02574528)
      PathPoint P4: calcn_r (0.0489719 0.02571584 0.02470957)
      PathPoint P5: calcn_r (0.07614125 0.01185165 0.03175347)
      PathPoint P6: calcn_r (0.09526042 0.007714752 0.01319334)
      PathPoint P7: calcn_r (0.134505 0.00950368 -0.02057267)
    DeGrooteFregly2016Muscle piri_r: max_isometric_force=1029.787 optimal_fiber_length=0.02799887
        tendon_slack_length=0.1237402 pennation_angle_at_optimal=0.1745329
        passive_fiber_strain_at_one_norm_force=0.7031405
      PathPoint P1: pelvis (-0.1006592 -0.006657139 0.01521834)
      PathPoint P2: pelvis (-0.1008669 -0.03125695 0.06862333)
      PathPoint P3: femur_r (-0.01641172 -0.00399204 0.04845893)
    DeGrooteFregly2016Muscle psoas_r: max_isometric_force=1426.79 optimal_fiber_length=0.1217673
        tendon_slack_length=0.1036878 pennation_angle_at_optimal=0.2155251
        passive_fiber_strain_at_one_norm_force=0.5032605
      PathPoint P1: pelvis (-0.05991504 0.06320714 0.04393155)
      PathPoint P2: pelvis (-0.02026829 -0.06667334 0.07389512)
      PathPoint P3: femur_r (-0.01463748 -0.05178563 0.00510094)
      PathPoint P4: femur_r (-0.02605915 -0.05810636 0.00975832)
      PathWrap: wrap_object=PS_at_brim_r method=hybrid range=(2 3)
    DeGrooteFregly2016Muscle recfem_r: max_isometric_force=2191.741 optimal_fiber_length=0.08337122
        tendon_slack_length=0.4947385 pennation_angle_at_optimal=0.2170149
        passive_fiber_strain_at_one_norm_force=0.8997465
      PathPoint P1: pelvis (-0.02372873 -0.03955544 0.1050978)
      PathPoint P2: patella_r (0.01 0.049 0.0007)
      PathPoint P3: patella_r (0.0121 0.0437 -0.001)
      PathPoint P4: patella_r (0.005 0.00247 3e-5)
      PathPoint P5: tibia_r (0.03497067 -0.06771009 -0.0005041784)
      PathWrap: wrap_object=KnExt_at_fem_r method=hybrid
    DeGrooteFregly2016Muscle sart_r: max_isometric_force=249.4131 optimal_fiber_length=0.4402832
        tendon_slack_length=0.1354716 pennation_angle_at_optimal=0.02613542
        passive_fiber_strain_at_one_norm_force=0.7021361
      PathPoint P1: pelvis (-0.01927959 -0.01590373 0.1189531)
      PathPoint P2: femur_r (-0.0033267 -0.3956555 -0.04668469)
      PathPoint P3: tibia_r (-0.02692527 -0.04301607 -0.03915428)
      PathPoint P4: tibia_r (-0.01705625 -0.06425593 -0.02831981)
      PathPoint P5: tibia_r (0.01458899 -0.08689032 -0.002789072)
    DeGrooteFregly2016Muscle semimem_r: max_isometric_force=2200.987 optimal_fiber_length=0.09570882
        tendon_slack_length=0.3728193 pennation_angle_at_optimal=0.2545615
        passive_fiber_strain_at_one_norm_force=0.7044745
      PathPoint P1: pelvis (-0.09758439 -0.1162196 0.06916403)
      PathPoint P2: tibia_r (-0.02896344 -0.04398152 -0.02102531)
      PathWrap: wrap_object=SM_at_condyles_r method=hybrid
    DeGrooteFregly2016Muscle semiten_r: max_isometric_force=591.2951 optimal_fiber_length=0.2143274
        tendon_slack_length=0.2745156 pennation_angle_at_optimal=0.241295
        passive_fiber_strain_at_one_norm_force=0.7136122
      PathPoint P1: pelvis (-0.1026267 -0.1277396 0.05801217)
      PathPoint P2: tibia_r (-0.03346886 -0.05449418 -0.02456529)
      PathPoint P3: tibia_r (0.002038168 -0.08292126 -0.01255082)
      PathWrap: wrap_object=ST_at_condyles_r method=hybrid
    DeGrooteFregly2016Muscle soleus_r: max_isometric_force=6194.843 optimal_fiber_length=0.04730675
        tendon_slack_length=0.3024944 pennation_angle_at_optimal=0.3814289
        passive_fiber_strain_at_one_norm_force=0.7659521
      PathPoint P1: tibia_r (-0.008152672 -0.09826115 0.01051266)
      PathPoint P2: calcn_r (0.004919552 0.03466048 -0.005925824)
    DeGrooteFregly2016Muscle tfl12_ITB_r: max_isometric_force=411.2066 optimal_fiber_length=0.1066123
        tendon_slack_length=0.4651182 pennation_angle_at_optimal=0.0436332 passive_fiber_strain_at_one_norm_force=0.7
        tendon_strain_at_one_norm_force=0.0530452
      PathPoint P1: pelvis (-0.01113273 0.01225403 0.1472045)
      PathPoint trochVP: femur_r (0.03515213 -0.1261928 0.03615014)
      PathPoint P2: femur_r (0.01040148 -0.4149393 0.05901566)
      PathPoint kneeVP: femur_r (0.002669398 -0.4333596 0.06553826)
      PathPoint P3: tibia_r (0.0127761 -0.04289807 0.0413319)
    DeGrooteFregly2016Muscle tibant_r: max_isometric_force=1227.452 optimal_fiber_length=0.07386067
        tendon_slack_length=0.2600383 pennation_angle_at_optimal=0.1951828
        passive_fiber_strain_at_one_norm_force=0.7083715
      PathPoint P1: tibia_r (0.01651989 -0.1407409 0.01737806)
      PathPoint P2: tibia_r (0.02692527 -0.2044604 0.01373082)
      PathPoint P3: tibia_r (0.02499438 -0.3925082 -0.0141599)
      PathPoint P4: calcn_r (0.1303681 0.01990182 -0.03410144)
    DeGrooteFregly2016Muscle tibpost_r: max_isometric_force=1730.154 optimal_fiber_length=0.04081666
        tendon_slack_length=0.3031874 pennation_angle_at_optimal=0.2264891
        passive_fiber_strain_at_one_norm_force=0.698029
      PathPoint P1: tibia_r (-0.004398152 -0.1398827 0.01104902)
      PathPoint P2: tibia_r (-0.01759261 -0.3920792 -0.0187726)
      PathPoint P3: calcn_r (0.04662394 0.03734387 -0.03197709)
      PathPoint P4: calcn_r (0.08631578 0.01777747 -0.03141805)
    DeGrooteFregly2016Muscle vasint_r: max_isometric_force=1697.361 optimal_fiber_length=0.1289044
        tendon_slack_length=0.2258582 pennation_angle_at_optimal=0.06309973
        passive_fiber_strain_at_one_norm_force=0.7074754
      PathPoint P1: femur_r (0.0321581 -0.2133524 0.0343759)
      PathPoint P2: femur_r (0.03714815 -0.2310948 0.03160365)
      PathPoint P3: patella_r (0.0058 0.048 -0.0006)
      PathPoint P4: patella_r (0.005 0.00247 -0.00039)
      PathPoint P5: tibia_r (0.03493849 -0.0677959 0.0004612696)
      PathWrap: wrap_object=KnExt_at_fem_r method=hybrid
    DeGrooteFregly2016Muscle vaslat_r: max_isometric_force=5148.767 optimal_fiber_length=0.1289113
        tendon_slack_length=0.2434992 pennation_angle_at_optimal=0.2528673
        passive_fiber_strain_at_one_norm_force=0.711135
      PathPoint P1: femur_r (0.00532272 -0.2055901 0.03870061)
      PathPoint P2: femur_r (0.02982941 -0.287316 0.04535401)
      PathPoint P3: patella_r (0.0103 0.0423 0.0141)
      PathPoint P4: patella_r (0.005 0.00247 0.00733)
      PathPoint P5: tibia_r (0.03490631 -0.06798899 0.005481599)
      PathWrap: wrap_object=KnExtVL_at_fem_r method=hybrid
    DeGrooteFregly2016Muscle vasmed_r: max_isometric_force=2747.823 optimal_fiber_length=0.1209695
        tendon_slack_length=0.2287423 pennation_angle_at_optimal=0.4222225
        passive_fiber_strain_at_one_norm_force=0.706013
      PathPoint P1: femur_r (0.0155246 -0.2327581 0.02084732)
      PathPoint P2: femur_r (0.03947684 -0.3070544 0.00099801)
      PathPoint P3: patella_r (0.0063 0.0445 -0.017)
      PathPoint P4: patella_r (0.005 0.00247 -0.0085)
      PathPoint P5: tibia_r (0.03421977 -0.06819281 -0.007273042)
      PathWrap: wrap_object=KnExt_at_fem_r method=hybrid
    DeGrooteFregly2016Muscle addbrev_l: max_isometric_force=625.8197 optimal_fiber_length=0.1146378
        tendon_slack_length=0.03941749 pennation_angle_at_optimal=0.1147809
        passive_fiber_strain_at_one_norm_force=0.5059595
      PathPoint P1: pelvis (-0.01888411 -0.09583018 -0.01734733)
      PathPoint P2: femur_l (-0.0022178 -0.1308502 -0.02761161)
      PathWrap: wrap_object=AB_at_femshaft_l method=hybrid
    DeGrooteFregly2016Muscle addlong_l: max_isometric_force=916.8 optimal_fiber_length=0.1200942
        tendon_slack_length=0.1462878 pennation_angle_at_optimal=0.1377704
        passive_fiber_strain_at_one_norm_force=0.5013184
      PathPoint P1: pelvis (-0.007494323 -0.09063088 -0.02126738)
      PathPoint P2: femur_l (0.01248621 -0.2654374 -0.01755389)
      PathWrap: wrap_object=AL_at_femshaft_l method=hybrid
    DeGrooteFregly2016Muscle addmagDist_l: max_isometric_force=597.2951 optimal_fiber_length=0.199814
        tendon_slack_length=0.0985321 pennation_angle_at_optimal=0.194705
        passive_fiber_strain_at_one_norm_force=0.7000001
      PathPoint P1: pelvis (-0.07320313 -0.1301557 -0.04485524)
      PathPoint P2: femur_l (0.01247513 -0.2910862 -0.02140177)
      PathWrap: wrap_object=AMdist_at_femshaft_l method=hybrid
    DeGrooteFregly2016Muscle addmagIsch_l: max_isometric_force=597.2951 optimal_fiber_length=0.1750964
        tendon_slack_length=0.2425153 pennation_angle_at_optimal=0.1680443
        passive_fiber_strain_at_one_norm_force=0.7000408
      PathPoint P1: pelvis (-0.08860703 -0.1322864 -0.04698423)
      PathPoint P2: femur_l (0.005333809 -0.4302199 0.0362943)
      PathWrap: wrap_object=AMisch_at_condyles_l method=hybrid
    DeGrooteFregly2016Muscle addmagMid_l: max_isometric_force=597.2951 optimal_fiber_length=0.1561788
        tendon_slack_length=0.05288494 pennation_angle_at_optimal=0.2073076
        passive_fiber_strain_at_one_norm_force=0.7000001
      PathPoint P1: pelvis (-0.05206478 -0.123101 -0.03214888)
      PathPoint P2: femur_l (0.002683538 -0.1800854 -0.03240206)
      PathWrap: wrap_object=AMmid_at_femshaft_l method=hybrid
    DeGrooteFregly2016Muscle addmagProx_l: max_isometric_force=597.2951 optimal_fiber_length=0.1179096
        tendon_slack_length=0.04502462 pennation_angle_at_optimal=0.3114833
        passive_fiber_strain_at_one_norm_force=0.7000001
      PathPoint P1: pelvis (-0.03062983 -0.109644 -0.01537604)
      PathPoint P2: femur_l (-0.0169329 -0.08744785 -0.03550698)
      PathWrap: wrap_object=AMprox_at_femshaft_l method=hybrid
    DeGrooteFregly2016Muscle bflh_l: max_isometric_force=1313.184 optimal_fiber_length=0.1085865
        tendon_slack_length=0.369927 pennation_angle_at_optimal=0.1759182
        passive_fiber_strain_at_one_norm_force=0.7054016
      PathPoint P1: pelvis (-0.1028245 -0.1214189 -0.06600997)
      PathPoint P2: tibia_l (-0.03685866 -0.03913283 -0.03881101)
      PathPoint P3: tibia_l (-0.02900635 -0.05372182 -0.03728775)
    DeGrooteFregly2016Muscle bfsh_l: max_isometric_force=557.1148 optimal_fiber_length=0.1217421
        tendon_slack_length=0.1167943 pennation_angle_at_optimal=0.2642232
        passive_fiber_strain_at_one_norm_force=0.6994891
      PathPoint P1: femur_l (0.0055445 -0.2340888 -0.02594826)
      PathPoint P2: tibia_l (-0.03074416 -0.03522812 -0.03436995)
      PathWrap: wrap_object=BF_at_gastroc_l method=hybrid
    DeGrooteFregly2016Muscle edl_l: max_isometric_force=603.4982 optimal_fiber_length=0.07553817
        tendon_slack_length=0.4020802 pennation_angle_at_optimal=0.2182582
        passive_fiber_strain_at_one_norm_force=0.7074931
      PathPoint P1: tibia_l (-0.01716352 -0.1241137 -0.02199076)
      PathPoint P2: tibia_l (0.01759261 -0.4033427 -0.01201446)
      PathPoint P3: calcn_l (0.1027516 0.04025088 -0.000894464)
      PathPoint P4: calcn_l (0.1806817 0.00614944 -0.01453504)
      PathPoint P5: toes_l (0.000335424 0.005254976 -0.01710662)
      PathPoint P6: toes_l (0.04953094 -0.000447232 -0.027952)
    DeGrooteFregly2016Muscle ehl_l: max_isometric_force=285.8675 optimal_fiber_length=0.08170331
        tendon_slack_length=0.3569553 pennation_angle_at_optimal=0.1972681
        passive_fiber_strain_at_one_norm_force=0.7147756
      PathPoint P1: tibia_l (-0.01501808 -0.1662716 -0.02027441)
      PathPoint P2: tibia_l (0.007616312 -0.3120542 -0.01759261)
      PathPoint P3: tibia_l (0.0214544 -0.3961555 0.003003616)
      PathPoint P4: calcn_l (0.1084538 0.04349331 0.02359149)
      PathPoint P5: calcn_l (0.1445677 0.03454867 0.02873466)
      PathPoint P6: calcn_l (0.1938751 0.01554131 0.03130624)
      PathPoint P7: toes_l (0.03331878 0.004584128 0.02739296)
      PathPoint P8: toes_l (0.0629479 0.003801472 0.02079629)
    DeGrooteFregly2016Muscle fdl_l: max_isometric_force=423.177 optimal_fiber_length=0.04883848
        tendon_slack_length=0.4147689 pennation_angle_at_optimal=0.2248391
        passive_fiber_strain_at_one_norm_force=0.6998542
      PathPoint P1: tibia_l (-0.002467256 -0.1965223 0.001930896)
      PathPoint P2: tibia_l (-0.01887987 -0.3910064 0.01330173)
      PathPoint P3: calcn_l (0.04874829 0.03521952 0.03130624)
      PathPoint P4: calcn_l (0.07916006 0.01967821 0.0294055)
      PathPoint P5: calcn_l (0.1853777 -0.009056448 -0.01296973)
      PathPoint P6: toes_l (-0.002124352 -0.008721024 -0.01643578)
      PathPoint P7: toes_l (0.03186528 -0.007938368 -0.02403872)
      PathPoint P8: toes_l (0.04930733 -0.00670848 -0.02705754)
    DeGrooteFregly2016Muscle fhl_l: max_isometric_force=907.8393 optimal_fiber_length=0.05782951
        tendon_slack_length=0.388829 pennation_angle_at_optimal=0.2580255
        passive_fiber_strain_at_one_norm_force=0.7001852
      PathPoint P1: tibia_l (-0.03325432 -0.2320293 -0.0214544)
      PathPoint P2: tibia_l (-0.02595982 -0.3937955 0.008152672)
      PathPoint P3: calcn_l (0.04181619 0.03085901 0.02694573)
      PathPoint P4: calcn_l (0.1160567 0.007602944 0.02862285)
      PathPoint P5: calcn_l (0.1929806 -0.005925824 0.03007635)
      PathPoint P6: toes_l (0.01733024 -0.007155712 0.02962912)
      PathPoint P7: toes_l (0.0628361 -0.01140442 0.02023725)
    DeGrooteFregly2016Muscle gaslat_l: max_isometric_force=1575.059 optimal_fiber_length=0.07419734
        tendon_slack_length=0.4021711 pennation_angle_at_optimal=0.2102268
        passive_fiber_strain_at_one_norm_force=0.6636807
      PathPoint P1: femur_l (0.0022178 -0.4224909 -0.02283225)
      PathPoint P2: calcn_l (0.004919552 0.03466048 0.005925824)
      PathWrap: wrap_object=GasLat_at_shank_l method=hybrid
      PathWrap pathwrap_0: wrap_object=GasLat_at_condyles_l method=hybrid
    DeGrooteFregly2016Muscle gasmed_l: max_isometric_force=3115.515 optimal_fiber_length=0.06344801
        tendon_slack_length=0.4161759 pennation_angle_at_optimal=0.1656816
        passive_fiber_strain_at_one_norm_force=0.550636
      PathPoint P1: femur_l (0.0066534 -0.4269265 0.0243958)
      PathPoint P2: calcn_l (0.004919552 0.03466048 0.005925824)
      PathWrap: wrap_object=GasMed_at_shank_l method=hybrid
      PathWrap pathwrap_0: wrap_object=GasMed_at_condyles_l method=hybrid
    DeGrooteFregly2016Muscle glmax1_l: max_isometric_force=494.2332 optimal_fiber_length=0.1544452
        tendon_slack_length=0.09172154 pennation_angle_at_optimal=0.3829252 passive_fiber_strain_at_one_norm_force=0.7
      PathPoint P1: pelvis (-0.1217086 0.03517172 -0.06341914)
      PathPoint P2: pelvis (-0.1242792 -0.02467117 -0.08775045)
      PathPoint P3: femur_l (-0.04923516 -0.03615014 -0.03348878)
      PathPoint P4: femur_l (-0.03071653 -0.06276374 -0.0521183)
      PathWrap: wrap_object=glmax1_at_pelvis_l method=hybrid
    DeGrooteFregly2016Muscle glmax2_l: max_isometric_force=391.8549 optimal_fiber_length=0.1669754
        tendon_slack_length=0.1159256 pennation_angle_at_optimal=0.3829252 passive_fiber_strain_at_one_norm_force=0.7
      PathPoint P1: pelvis (-0.1302114 0.008869389 -0.05204199)
      PathPoint P2: pelvis (-0.1328809 -0.06208572 -0.09158038)
      PathPoint P3: femur_l (-0.0499005 -0.06475976 -0.02794428)
      PathPoint P4: femur_l (-0.01729884 -0.1126642 -0.04646291)
      PathWrap: wrap_object=glmax2_at_pelvis_l method=hybrid
    DeGrooteFregly2016Muscle glmax3_l: max_isometric_force=454.9471 optimal_fiber_length=0.1794644
        tendon_slack_length=0.1142536 pennation_angle_at_optimal=0.3829252 passive_fiber_strain_at_one_norm_force=0.7
      PathPoint P1: pelvis (-0.1283526 -0.03171571 -0.02584076)
      PathPoint P2: pelvis (-0.1263753 -0.1060147 -0.0717436)
      PathPoint P3: femur_l (-0.03499688 -0.1131965 -0.02055901)
      PathPoint P4: femur_l (-0.01066762 -0.1337777 -0.03974298)
      PathWrap: wrap_object=glmax3_at_pelvis_l method=hybrid
    DeGrooteFregly2016Muscle glmax4_l: max_isometric_force=211.4407 optimal_fiber_length=0.180667
        tendon_slack_length=0.1114294 pennation_angle_at_optimal=0.3829252 passive_fiber_strain_at_one_norm_force=0.7
      PathPoint P1: pelvis (-0.1285306 -0.05352218 -0.01013805)
      PathPoint P2: pelvis (-0.1258611 -0.1287591 -0.04900057)
      PathPoint P3: femur_l (-0.03116009 -0.1247513 -0.01042366)
      PathPoint P4: femur_l (-0.0066534 -0.1573529 -0.04557579)
      PathWrap: wrap_object=glmax4_at_pelvis_l method=hybrid
    DeGrooteFregly2016Muscle glmax12_ITB_l: max_isometric_force=834.4754 optimal_fiber_length=0.1663769
        tendon_slack_length=0.462158 pennation_angle_at_optimal=0.4590216 passive_fiber_strain_at_one_norm_force=0.7
        tendon_strain_at_one_norm_force=0.08707634
      PathPoint P1: pelvis (-0.1194148 0.01097969 -0.06855575)
      PathPoint trochVP: femur_l (-0.06686667 -0.03049475 -0.0421382)
      PathPoint P2: femur_l (-0.04695083 -0.1605576 -0.04783795)
      PathPoint P3: femur_l (-0.03406541 -0.2353529 -0.05906001)
      PathPoint kneeVP: femur_l (-0.008126802 -0.4469119 -0.05010185)
      PathPoint P4: tibia_l (-0.003582885 -0.05589944 -0.03434849)
      PathWrap pathwrap-1: wrap_object=glmax12_ITB_at_pelvis_l method=hybrid
    DeGrooteFregly2016Muscle glmax34_ITB_l: max_isometric_force=950.6323 optimal_fiber_length=0.1814346
        tendon_slack_length=0.446776 pennation_angle_at_optimal=0.4590216 passive_fiber_strain_at_one_norm_force=0.7
        tendon_strain_at_one_norm_force=0.1100756
      PathPoint P1: pelvis (-0.1502819 -0.04038121 -0.01768526)
      PathPoint P2: pelvis (-0.1416111 -0.1018858 -0.05564663)
      PathPoint trochVP: femur_l (-0.04601935 -0.08416551 -0.0099801)
      PathPoint P3: femur_l (-0.04693974 -0.1840996 -0.03359967)
      PathPoint kneeVP: femur_l (-0.01831675 -0.4468675 -0.03435613)
      PathPoint P4: tibia_l (-0.01469626 -0.06940498 -0.03689084)
    DeGrooteFregly2016Muscle glmed1_l: max_isometric_force=1093.467 optimal_fiber_length=0.07917273
        tendon_slack_length=0.06054385 pennation_angle_at_optimal=0.3165559
        passive_fiber_strain_at_one_norm_force=0.7000001
      PathPoint P1: pelvis (-0.04844615 0.02650622 -0.1295418)
      PathPoint P2: femur_l (-0.0155246 -0.0199602 -0.0654251)
    DeGrooteFregly2016Muscle glmed2_l: max_isometric_force=765.0917 optimal_fiber_length=0.08690504
        tendon_slack_length=0.07805935 pennation_angle_at_optimal=0.3165559
        passive_fiber_strain_at_one_norm_force=0.6904088
      PathPoint P1: pelvis (-0.08403925 0.05607085 -0.0923689)
      PathPoint P2: femur_l (-0.0243958 -0.011089 -0.0620984)
    DeGrooteFregly2016Muscle glmed3_l: max_isometric_force=871.1993 optimal_fiber_length=0.0818337
        tendon_slack_length=0.05071384 pennation_angle_at_optimal=0.3165559
        passive_fiber_strain_at_one_norm_force=0.6558113
      PathPoint P1: pelvis (-0.0988697 0.01631152 -0.0720928)
      PathPoint P2: femur_l (-0.03426501 -0.00521183 -0.05744102)
    DeGrooteFregly2016Muscle glmin1_l: max_isometric_force=374.0459 optimal_fiber_length=0.08383034
        tendon_slack_length=0.01990068 pennation_angle_at_optimal=0.1745329
        passive_fiber_strain_at_one_norm_force=0.7000001
      PathPoint P1: pelvis (-0.02966091 0 -0.1329211)
      PathPoint P2: femur_l (0.0055445 -0.0166335 -0.0620984)
    DeGrooteFregly2016Muscle glmin2_l: max_isometric_force=394.8197 optimal_fiber_length=0.0709732
        tendon_slack_length=0.0330795 pennation_angle_at_optimal=0 passive_fiber_strain_at_one_norm_force=0.6999804
      PathPoint P1: pelvis (-0.06090374 0.0101947 -0.1137714)
      PathPoint P2: femur_l (0.0044356 -0.0099801 -0.0576628)
    DeGrooteFregly2016Muscle glmin3_l: max_isometric_force=446.7738 optimal_fiber_length=0.03703025
        tendon_slack_length=0.04951354 pennation_angle_at_optimal=0.01745329
        passive_fiber_strain_at_one_norm_force=0.6990981
      PathPoint P1: pelvis (-0.07800819 -0.01580179 -0.08989071)
      PathPoint P2: femur_l (-0.0044356 -0.0011089 -0.0565539)
    DeGrooteFregly2016Muscle grac_l: max_isometric_force=281.3115 optimal_fiber_length=0.2534419
        tendon_slack_length=0.1913763 pennation_angle_at_optimal=0.1720016
        passive_fiber_strain_at_one_norm_force=0.7244614
      PathPoint P1: pelvis (-0.04682469 -0.1318379 -0.02766561)
      PathPoint P2: tibia_l (-0.0197595 -0.05100784 0.03176324)
      PathPoint P3: tibia_l (0.001909442 -0.07468277 0.01687389)
      PathWrap: wrap_object=GR_at_condyles_l method=hybrid
    DeGrooteFregly2016Muscle iliacus_l: max_isometric_force=1021.141 optimal_fiber_length=0.1111174
        tendon_slack_length=0.1001941 pennation_angle_at_optimal=0.279914
        passive_fiber_strain_at_one_norm_force=0.5020882
      PathPoint P1: pelvis (-0.05981617 0.03150162 -0.09495973)
      PathPoint P2: pelvis (-0.01334741 -0.05678448 -0.08515962)
      PathPoint P3: femur_l (-0.00255047 -0.06265285 -0.01541371)
      PathPoint P4: femur_l (-0.01352858 -0.07063693 -0.02173444)
      PathWrap: wrap_object=IL_at_brim_l method=hybrid range=(2 3)
    DeGrooteFregly2016Muscle perbrev_l: max_isometric_force=521.2016 optimal_fiber_length=0.04913054
        tendon_slack_length=0.1596499 pennation_angle_at_optimal=0.2052361
        passive_fiber_strain_at_one_norm_force=0.6992207
      PathPoint P1: tibia_l (-0.0260671 -0.2716127 -0.02692527)
      PathPoint P2: tibia_l (-0.03636521 -0.4176099 -0.02671073)
      PathPoint P3: tibia_l (-0.03057252 -0.4295171 -0.02735436)
      PathPoint P4: calcn_l (0.05266157 0.03018816 -0.02605126)
      PathPoint P5: calcn_l (0.07569402 0.02448595 -0.03835014)
    DeGrooteFregly2016Muscle perlong_l: max_isometric_force=1115.371 optimal_fiber_length=0.0552083
        tendon_slack_length=0.3610501 pennation_angle_at_optimal=0.2479525
        passive_fiber_strain_at_one_norm_force=0.6966414
      PathPoint P1: tibia_l (-0.0214544 -0.1472845 -0.0302507)
      PathPoint P2: tibia_l (-0.03400522 -0.4183608 -0.02542346)
      PathPoint P3: tibia_l (-0.02917798 -0.4305898 -0.02574528)
      PathPoint P4: calcn_l (0.0489719 0.02571584 -0.02470957)
      PathPoint P5: calcn_l (0.07614125 0.01185165 -0.03175347)
      PathPoint P6: calcn_l (0.09526042 0.007714752 -0.01319334)
      PathPoint P7: calcn_l (0.134505 0.00950368 0.02057267)
    DeGrooteFregly2016Muscle piri_l: max_isometric_force=1029.787 optimal_fiber_length=0.02799887
        tendon_slack_length=0.1237402 pennation_angle_at_optimal=0.1745329
        passive_fiber_strain_at_one_norm_force=0.7031405
      PathPoint P1: pelvis (-0.1006592 -0.006657139 -0.01521834)
      PathPoint P2: pelvis (-0.1008669 -0.03125695 -0.06862333)
      PathPoint P3: femur_l (-0.01641172 -0.00399204 -0.04845893)
    DeGrooteFregly2016Muscle psoas_l: max_isometric_force=1426.79 optimal_fiber_length=0.1217673
        tendon_slack_length=0.1036878 pennation_angle_at_optimal=0.2155251
        passive_fiber_strain_at_one_norm_force=0.5032605
      PathPoint P1: pelvis (-0.05991504 0.06320714 -0.04393155)
      PathPoint P2: pelvis (-0.02026829 -0.06667334 -0.07389512)
      PathPoint P3: femur_l (-0.01463748 -0.05178563 -0.00510094)
      PathPoint P4: femur_l (-0.02605915 -0.05810636 -0.00975832)
      PathWrap: wrap_object=PS_at_brim_l method=hybrid range=(2 3)
    DeGrooteFregly2016Muscle recfem_l: max_isometric_force=2191.741 optimal_fiber_length=0.0833714
        tendon_slack_length=0.4947385 pennation_angle_at_optimal=0.2170149
        passive_fiber_strain_at_one_norm_force=0.8997465
      PathPoint P1: pelvis (-0.02372873 -0.03955544 -0.1050978)
      PathPoint P2: patella_l (0.01 0.049 -0.0007)
      PathPoint P3: patella_l (0.0121 0.0437 0.001)
      PathPoint P4: patella_l (0.005 0.00247 -3e-5)
      PathPoint P5: tibia_l (0.03497067 -0.06771009 0.0005041784)
      PathWrap: wrap_object=KnExt_at_fem_l method=hybrid
    DeGrooteFregly2016Muscle sart_l: max_isometric_force=249.4131 optimal_fiber_length=0.4402831
        tendon_slack_length=0.1354715 pennation_angle_at_optimal=0.02613542
        passive_fiber_strain_at_one_norm_force=0.7021361
      PathPoint P1: pelvis (-0.01927959 -0.01590373 -0.1189531)
      PathPoint P2: femur_l (-0.0033267 -0.3956555 0.04668469)
      PathPoint P3: tibia_l (-0.02692527 -0.04301607 0.03915428)
      PathPoint P4: tibia_l (-0.01705625 -0.06425593 0.02831981)
      PathPoint P5: tibia_l (0.01458899 -0.08689032 0.002789072)
    DeGrooteFregly2016Muscle semimem_l: max_isometric_force=2200.987 optimal_fiber_length=0.09570882
        tendon_slack_length=0.3728193 pennation_angle_at_optimal=0.2545615
        passive_fiber_strain_at_one_norm_force=0.7044745
      PathPoint P1: pelvis (-0.09758439 -0.1162196 -0.06916403)
      PathPoint P2: tibia_l (-0.02896344 -0.04398152 0.02102531)
      PathWrap: wrap_object=SM_at_condyles_l method=hybrid
    DeGrooteFregly2016Muscle semiten_l: max_isometric_force=591.2951 optimal_fiber_length=0.214327
        tendon_slack_length=0.2745151 pennation_angle_at_optimal=0.241295
        passive_fiber_strain_at_one_norm_force=0.7136122
      PathPoint P1: pelvis (-0.1026267 -0.1277396 -0.05801217)
      PathPoint P2: tibia_l (-0.03346886 -0.05449418 0.02456529)
      PathPoint P3: tibia_l (0.002038168 -0.08292126 0.01255082)
      PathWrap: wrap_object=ST_at_condyles_l method=hybrid
    DeGrooteFregly2016Muscle soleus_l: max_isometric_force=6194.843 optimal_fiber_length=0.04730675
        tendon_slack_length=0.3024944 pennation_angle_at_optimal=0.3814289
        passive_fiber_strain_at_one_norm_force=0.7659521
      PathPoint P1: tibia_l (-0.008152672 -0.09826115 -0.01051266)
      PathPoint P2: calcn_l (0.004919552 0.03466048 0.005925824)
    DeGrooteFregly2016Muscle tfl12_ITB_l: max_isometric_force=411.2066 optimal_fiber_length=0.1066123
        tendon_slack_length=0.4651182 pennation_angle_at_optimal=0.0436332 passive_fiber_strain_at_one_norm_force=0.7
        tendon_strain_at_one_norm_force=0.0530452
      PathPoint P1: pelvis (-0.01113273 0.01225403 -0.1472045)
      PathPoint trochVP: femur_l (0.03515213 -0.1261928 -0.03615014)
      PathPoint P2: femur_l (0.01040148 -0.4149393 -0.05901566)
      PathPoint kneeVP: femur_l (0.002669398 -0.4333596 -0.06553826)
      PathPoint P3: tibia_l (0.0127761 -0.04289807 -0.0413319)
    DeGrooteFregly2016Muscle tibant_l: max_isometric_force=1227.452 optimal_fiber_length=0.07386067
        tendon_slack_length=0.2600383 pennation_angle_at_optimal=0.1951828
        passive_fiber_strain_at_one_norm_force=0.7083715
      PathPoint P1: tibia_l (0.01651989 -0.1407409 -0.01737806)
      PathPoint P2: tibia_l (0.02692527 -0.2044604 -0.01373082)
      PathPoint P3: tibia_l (0.02499438 -0.3925082 0.0141599)
      PathPoint P4: calcn_l (0.1303681 0.01990182 0.03410144)
    DeGrooteFregly2016Muscle tibpost_l: max_isometric_force=1730.154 optimal_fiber_length=0.04081666
        tendon_slack_length=0.3031874 pennation_angle_at_optimal=0.2264891
        passive_fiber_strain_at_one_norm_force=0.698029
      PathPoint P1: tibia_l (-0.004398152 -0.1398827 -0.01104902)
      PathPoint P2: tibia_l (-0.01759261 -0.3920792 0.0187726)
      PathPoint P3: calcn_l (0.04662394 0.03734387 0.03197709)
      PathPoint P4: calcn_l (0.08631578 0.01777747 0.03141805)
    DeGrooteFregly2016Muscle vasint_l: max_isometric_force=1697.361 optimal_fiber_length=0.1289044
        tendon_slack_length=0.2258582 pennation_angle_at_optimal=0.06309973
        passive_fiber_strain_at_one_norm_force=0.7074754
      PathPoint P1: femur_l (0.0321581 -0.2133524 -0.0343759)
      PathPoint P2: femur_l (0.03714815 -0.2310948 -0.03160365)
      PathPoint P3: patella_l (0.0058 0.048 0.0006)
      PathPoint P4: patella_l (0.005 0.00247 0.00039)
      PathPoint P5: tibia_l (0.03493849 -0.0677959 -0.0004612696)
      PathWrap: wrap_object=KnExt_at_fem_l method=hybrid
    DeGrooteFregly2016Muscle vaslat_l: max_isometric_force=5148.767 optimal_fiber_length=0.1289113
        tendon_slack_length=0.2434992 pennation_angle_at_optimal=0.2528673
        passive_fiber_strain_at_one_norm_force=0.711135
      PathPoint P1: femur_l (0.00532272 -0.2055901 -0.03870061)
      PathPoint P2: femur_l (0.02982941 -0.287316 -0.04535401)
      PathPoint P3: patella_l (0.0103 0.0423 -0.0141)
      PathPoint P4: patella_l (0.005 0.00247 -0.00733)
      PathPoint P5: tibia_l (0.03490631 -0.06798899 -0.005481599)
      PathWrap: wrap_object=KnExtVL_at_fem_l method=hybrid
    DeGrooteFregly2016Muscle vasmed_l: max_isometric_force=2747.823 optimal_fiber_length=0.1209695
        tendon_slack_length=0.2287423 pennation_angle_at_optimal=0.4222225
        passive_fiber_strain_at_one_norm_force=0.706013
      PathPoint P1: femur_l (0.0155246 -0.2327581 -0.02084732)
      PathPoint P2: femur_l (0.03947684 -0.3070544 -0.00099801)
      PathPoint P3: patella_l (0.0063 0.0445 0.017)
      PathPoint P4: patella_l (0.005 0.00247 0.0085)
      PathPoint P5: tibia_l (0.03421977 -0.06819281 0.007273042)
      PathWrap: wrap_object=KnExt_at_fem_l method=hybrid
    CoordinateActuator reserve_jointset_hip_r_hip_flexion_r: min_control=-50 max_control=50 coordinate=hip_flexion_r
        optimal_force=1
    CoordinateActuator reserve_jointset_hip_r_hip_adduction_r: min_control=-50 max_control=50
        coordinate=hip_adduction_r optimal_force=1
    CoordinateActuator reserve_jointset_hip_r_hip_rotation_r: min_control=-50 max_control=50 coordinate=hip_rotation_r
        optimal_force=1
    CoordinateActuator reserve_jointset_walker_knee_r_knee_angle_r: min_control=-50 max_control=50
        coordinate=knee_angle_r optimal_force=1
    CoordinateActuator reserve_jointset_ankle_r_ankle_angle_r: min_control=-50 max_control=50 coordinate=ankle_angle_r
        optimal_force=1
    CoordinateActuator reserve_jointset_hip_l_hip_flexion_l: min_control=-50 max_control=50 coordinate=hip_flexion_l
        optimal_force=1
    CoordinateActuator reserve_jointset_hip_l_hip_adduction_l: min_control=-50 max_control=50
        coordinate=hip_adduction_l optimal_force=1
    CoordinateActuator reserve_jointset_hip_l_hip_rotation_l: min_control=-50 max_control=50 coordinate=hip_rotation_l
        optimal_force=1
    CoordinateActuator reserve_jointset_walker_knee_l_knee_angle_l: min_control=-50 max_control=50
        coordinate=knee_angle_l optimal_force=1
    CoordinateActuator reserve_jointset_ankle_l_ankle_angle_l: min_control=-50 max_control=50 coordinate=ankle_angle_l
        optimal_force=1
    ObjectGroup right_leg
    ObjectGroup left_leg
    ObjectGroup hip_add_r
    ObjectGroup hip_abd_r
    ObjectGroup hip_flex_r
    ObjectGroup hip_ext_r
    ObjectGroup hip_inrot_r
    ObjectGroup hip_exrot_r
    ObjectGroup knee_flex_r
    ObjectGroup knee_ext_r
    ObjectGroup ankle_df_r
    ObjectGroup ankle_pf_r
    ObjectGroup everter_r
    ObjectGroup inverter_r
    ObjectGroup hip_add_l
    ObjectGroup hip_abd_l
    ObjectGroup hip_flex_l
    ObjectGroup hip_ext_l
    ObjectGroup hip_exrot_l
    ObjectGroup hip_inrot_l
    ObjectGroup knee_flex_l
    ObjectGroup knee_ext_l
    ObjectGroup ankle_df_l
    ObjectGroup ankle_pf_l
    ObjectGroup everter_l
    ObjectGroup inverter_l
  MarkerSet:
    Marker RACR: torso (-0.002974455 0.4213811 0.1288931)
    Marker LACR: torso (-0.002974455 0.4213811 -0.1288931)
    Marker C7: torso (-0.08427622 0.431296 0.001640174)
    Marker CLAV: torso (0.0396594 0.3767643 0.01685525)
    Marker RASH: torso (0.04957425 0.3683367 0.1685524)
    Marker RPSH: torso (-0.04957425 0.3683367 0.1685524)
    Marker LASH: torso (0.04957425 0.3683367 -0.1685524)
    Marker LPSH: torso (-0.05750613 0.3683367 -0.1685524)
    Marker RSJC: humerus_r (0 0 0)
    Marker RUA1: humerus_r (0 -0.055291 0.0221164)
    Marker RUA2: humerus_r (0 -0.221164 0.0221164)
    Marker RUA3: humerus_r (0.0331746 -0.1437566 0.0221164)
    Marker RLEL: humerus_r (0.0165873 -0.3096296 0.0442328)
    Marker RMEL: humerus_r (0.002488095 -0.3162645 -0.05086772)
    Marker RFAsuperior: ulna_r (0.005127006 -0.08914207 0.05046202)
    Marker RFAradius: radius_r (0.000556735 -0.2505308 0.0556735)
    Marker RFAulna: radius_r (-0.02449634 -0.2505308 -0.02449634)
    Marker LSJC: humerus_l (0 0 0)
    Marker LUA1: humerus_l (0 -0.055291 -0.0221164)
    Marker LUA2: humerus_l (0 -0.221164 -0.0221164)
    Marker LUA3: humerus_l (0.0331746 -0.1437566 -0.0221164)
    Marker LLEL: humerus_l (0.0165873 -0.3096296 -0.0442328)
    Marker LMEL: humerus_l (0.00248815 -0.3162645 0.05086772)
    Marker LFAsuperior: ulna_l (0.005127006 -0.08914207 -0.05046202)
    Marker LFAradius: radius_l (0.000556735 -0.2505308 -0.0556735)
    Marker LFAulna: radius_l (-0.02449634 -0.2505308 0.02449634)
    Marker RASI: pelvis (0.009422747 0.01843365 0.1447083)
    Marker LASI: pelvis (0.009422747 0.01843365 -0.1447083)
    Marker RPSI: pelvis (-0.153248 0.03568145 0.05069025)
    Marker LPSI: pelvis (-0.153248 0.03568145 -0.05069025)
    Marker LHJC: femur_l (0 0 0)
    Marker RHJC: femur_r (0 0 0)
    Marker RTH1: femur_r (0.0199602 -0.166335 0.0709696)
    Marker RTH2: femur_r (0.088712 -0.255047 0.00521183)
    Marker RTH3: femur_r (0.011089 -0.33267 0.066534)
    Marker RLFC: femur_r (0 -0.4479956 0.055445)
    Marker RMFC: femur_r (0 -0.4479956 -0.055445)
    Marker RKJC: tibia_r (0.001856878 -0.002562728 -0.009066629)
    Marker RTB1: tibia_r (-0.001782625 -0.1678678 0.05282009)
    Marker RTB2: tibia_r (0.03965234 -0.2468404 -0.004201834)
    Marker RTB3: tibia_r (0.0122068 -0.3167056 0.05937945)
    Marker RLMAL: tibia_r (-0.0053636 -0.4170735 0.05685416)
    Marker RMMAL: tibia_r (0.00643632 -0.4170735 -0.04076336)
    Marker RAJC: talus_r (0 0 0)
    Marker RCAL: calcn_r (-0.027952 0.0223616 -0.0055904)
    Marker RTOE: calcn_r (0.2292064 0.03324141 -0.0335424)
    Marker RMT5: calcn_r (0.1621216 0.02785137 0.06596672)
    Marker LTH1: femur_l (0.0199602 -0.166335 -0.0709696)
    Marker LTH2: femur_l (0.088712 -0.255047 -0.00521183)
    Marker LTH3: femur_l (0.011089 -0.33267 -0.066534)
    Marker LLFC: femur_l (0 -0.4479956 -0.055445)
    Marker LMFC: femur_l (0 -0.4479956 0.055445)
    Marker LKJC: tibia_l (0.001856878 -0.002562728 0.009066629)
    Marker LTB1: tibia_l (-0.001782625 -0.1678678 -0.05282009)
    Marker LTB2: tibia_l (0.03965234 -0.2468404 0.004201834)
    Marker LTB3: tibia_l (0.0122068 -0.3167056 -0.05937945)
    Marker LLMAL: tibia_l (-0.0053636 -0.4170735 -0.05685416)
    Marker LMMAL: tibia_l (0.00643632 -0.4170735 0.04076336)
    Marker LAJC: talus_l (0 0 0)
    Marker LCAL: calcn_l (-0.027952 0.0223616 0.0055904)
    Marker LTOE: calcn_l (0.2292064 0.03324052 0.0335424)
    Marker LMT5: calcn_l (0.1621216 0.02785025 -0.06596672)
    Marker REJC: ulna_r (0 0 0)
    Marker LEJC: ulna_l (0 0 0)
    Marker R_tibial_plateau: tibia_r (-0.008677811 -0.01823624 -0.00159271)
    Marker L_tibial_plateau: tibia_l (-0.008677811 -0.01823624 0.00159271)
