# OpenSim document version 40600
Model Eng_2015_IT_band_on_Rajagopal_2016:
  gravity: 0 -9.80665 0
  length_units: meters
  force_units: N
  credits:
    Rajagopal et al 2016; Uhlrich et al 2021; Eng et al 2015; Davis 20XX
  publications:
    [0] Eng, C.M., Arnold, A.S., Lieberman, D.E. and Biewener, A.A. (2015) The capacity of the human iliotibial band to store elastic energy during running. Journal of Biomechanics. [1] Davis, J.J. (2026) A full-body musculoskeletal model with an anatomically informed iliotibial band. bioRxiv.
  Ground
  BodySet:
    Body pelvis: mass=11.777 [kg] mass_center=(-0.0707 0 0) inertia=(0.1028 0.0871 0.0579 0 0 0)
        meshes=(r_pelvis.vtp l_pelvis.vtp sacrum.vtp)
      WrapEllipsoid Gmax_at_ischium: xyz_body_rotation=(-0.637 0.3836 -0.6849) translation=(-0.0628 -0.0618 0.0545)
          quadrant=all dimensions=(0.051 0.0495 0.0565)
      WrapEllipsoid Gmax_at_ischium2: xyz_body_rotation=(-0.5313 0.744 -0.9489) translation=(-0.0814 -0.0827 0.0482)
          quadrant=all dimensions=(0.0752 0.0567 0.0669)
      WrapEllipsoid Gmax_at_pelvis: xyz_body_rotation=(-0.637 0.3836 -0.6849) translation=(-0.0795 -0.0825 0.0665)
          quadrant=all dimensions=(0.04 0.04 0.06)
    Body femur_r: mass=9.3014 mass_center=(0 -0.17 0) inertia=(0.1339 0.0351 0.1412 0 0 0) meshes=r_femur.vtp
      WrapEllipsoid greater_trochanter: xyz_body_rotation=(-1.6659 -0.18483 -0.36303)
          translation=(-0.0154 -0.0325 0.0365) quadrant=all dimensions=(0.0333 0.0317 0.0398)
      WrapTorus ITB_at_gtrochAnt: xyz_body_rotation=(1.960703 -0.09721484 0.02775074)
          translation=(0.0317 -0.1138 0.0326) quadrant=all inner_radius=0.0091 outer_radius=0.0217
      WrapTorus ITB_at_gtrochPost5: xyz_body_rotation=(1.5525 0.5423 -0.0508) translation=(-0.0603 -0.0275 0.038)
          quadrant=all inner_radius=0.0085 outer_radius=0.023
      WrapTorus ITB_at_gtrochPost6: xyz_body_rotation=(1.313 0.3775 0.0452) translation=(-0.0415 -0.0759 0.009)
          quadrant=all inner_radius=0.0111 outer_radius=0.0258
      WrapEllipsoid TFL_at_knee: xyz_body_rotation=(0.0543 0.4086 1.4106) translation=(0.0107 -0.4036 0.0146)
          quadrant=all dimensions=(0.0233 0.0318 0.0461)
      WrapEllipsoid Gmax12_at_knee: xyz_body_rotation=(0.5981 -0.0407 -1.3961) translation=(-0.0371 -0.3682 -0.0041)
          quadrant=+y dimensions=(0.036 0.0244 0.0846)
      WrapEllipsoid Gmax34_at_knee: xyz_body_rotation=(0.5981 -0.0407 -1.3755) translation=(-0.0476 -0.3632 -0.009)
          quadrant=+y dimensions=(0.036 0.0244 0.0846)
    Body tibia_r: mass=3.7075 mass_center=(0 -0.1867 0) inertia=(0.0504 0.0051 0.0511 0 0 0)
        meshes=(r_tibia.vtp r_fibula.vtp)
    Body patella_r: mass=0.0862 mass_center=(0.0018 0.0264 0) inertia=(2.87e-6 1.311e-5 1.311e-5 0 0 0)
        meshes=r_patella.vtp
    Body talus_r: mass=0.1 mass_center=(0 0 0) inertia=(0.001 0.001 0.001 0 0 0) meshes=r_talus.vtp
    Body calcn_r: mass=1.25 mass_center=(0.1 0.03 0) inertia=(0.0014 0.0039 0.0041 0 0 0) meshes=r_foot.vtp
    Body toes_r: mass=0.2166 mass_center=(0.0346 0.006 -0.0175) inertia=(0.0001 0.0002 0.001 0 0 0) meshes=r_bofoot.vtp
  JointSet:
    CustomJoint ground_pelvis: socket_parent_frame=ground_offset socket_child_frame=pelvis_offset
      Coordinate pelvis_tilt: default_value=0 range=(-1.570796 1.570796) clamped=true
      Coordinate pelvis_list: default_value=0 range=(-1.570796 1.570796) clamped=true
      Coordinate pelvis_rotation: default_value=0 range=(-1.570796 1.570796) clamped=true
      Coordinate pelvis_tx: default_value=0 range=(-5 5) clamped=true
      Coordinate pelvis_ty: default_value=0.94 range=(-1 2) clamped=true
      Coordinate pelvis_tz: default_value=0 range=(-3 3) clamped=true
      PhysicalOffsetFrame ground_offset: socket_parent=/ground translation=(0 0 0) [meters]
      PhysicalOffsetFrame pelvis_offset: socket_parent=/bodyset/pelvis translation=(0 0 0)
      SpatialTransform:
        TransformAxis rotation1: coordinates=pelvis_tilt axis=(0 0 1) LinearFunction(coefficients=1 0)
        TransformAxis rotation2: coordinates=pelvis_list axis=(1 0 0) LinearFunction(coefficients=1 0)
        TransformAxis rotation3: coordinates=pelvis_rotation axis=(0 1 0) LinearFunction(coefficients=1 0)
        TransformAxis translation1: coordinates=pelvis_tx axis=(1 0 0) LinearFunction(coefficients=1 0)
        TransformAxis translation2: coordinates=pelvis_ty axis=(0 1 0) LinearFunction(coefficients=1 0)
        TransformAxis translation3: coordinates=pelvis_tz axis=(0 0 1) LinearFunction(coefficients=1 0)
    CustomJoint hip_r: socket_parent_frame=pelvis_offset socket_child_frame=femur_r_offset
      Coordinate hip_flexion_r: default_value=0 range=(-0.5235988 2.094395) clamped=true
      Coordinate hip_adduction_r: default_value=0 range=(-0.8726646 0.5235988) clamped=true
      Coordinate hip_rotation_r: default_value=0 range=(-0.6981317 0.6981317) clamped=true
      PhysicalOffsetFrame pelvis_offset: socket_parent=/bodyset/pelvis translation=(-0.056276 -0.07849 0.07726)
      PhysicalOffsetFrame femur_r_offset: socket_parent=/bodyset/femur_r translation=(0 0 0)
      SpatialTransform: axes_held_at_zero=(translation1 translation2 translation3)
        TransformAxis rotation1: coordinates=hip_flexion_r axis=(0 0 1) LinearFunction(coefficients=1 0)
        TransformAxis rotation2: coordinates=hip_adduction_r axis=(1 0 0) LinearFunction(coefficients=1 0)
        TransformAxis rotation3: coordinates=hip_rotation_r axis=(0 1 0) LinearFunction(coefficients=1 0)
    CustomJoint walker_knee_r: socket_parent_frame=femur_r_offset socket_child_frame=tibia_r_offset
      Coordinate knee_angle_r: default_value=0 range=(0 2.0944) clamped=true
      PhysicalOffsetFrame femur_r_offset: socket_parent=/bodyset/femur_r translation=(-0.00809 -0.40796 -0.00275)
          orientation=(-1.64157 1.44618 1.5708) [radians]
      PhysicalOffsetFrame tibia_r_offset: socket_parent=/bodyset/tibia_r
          translation=(-0.00808954 -0.0035348 -0.00148474) orientation=(-1.64157 1.44618 1.5708)
      SpatialTransform: axes_held_at_zero=translation3
        TransformAxis rotation1: coordinates=knee_angle_r axis=(1 0 0) LinearFunction(coefficients=1 0)
        TransformAxis rotation2: coordinates=knee_angle_r axis=(0 0 1)
          SimmSpline: x=(0 0.174533 0.349066 0.523599 0.698132 0.872665 1.0472 1.22173 1.39626 1.5708 1.74533 1.91986 2.0944)
              y=(0 0.0126809 0.0226969 0.0296054 0.0332049 0.0335354 0.0308779 0.0257548 0.0189295 0.011407 0.00443314 -0.00050475 -0.0016782)
        TransformAxis rotation3: coordinates=knee_angle_r axis=(0 1 0)
          SimmSpline: x=(0 0.174533 0.349066 0.523599 0.698132 0.872665 1.0472 1.22173 1.39626 1.5708 1.74533 1.91986 2.0944)
              y=(0 0.059461 0.109399 0.150618 0.18392 0.210107 0.229983 0.24435 0.254012 0.25977 0.262428 0.262788 0.261654)
        TransformAxis translation1: coordinates=knee_angle_r axis=(0 1 0)
          SimmSpline: x=(0 0.174533 0.349066 0.523599 0.698132 0.872665 1.0472 1.22173 1.39626 1.5708 1.74533 1.91986 2.0944)
              y=(0 0.000479 0.000835 0.001086 0.001251 0.001346 0.001391 0.001403 0.0014 0.0014 0.001421 0.001481 0.001599)
        TransformAxis translation2: coordinates=knee_angle_r axis=(0 0 1)
          SimmSpline: x=(0 0.174533 0.349066 0.523599 0.698132 0.872665 1.0472 1.22173 1.39626 1.5708 1.74533 1.91986 2.0944)
              y=(0 0.000988 0.001899 0.002734 0.003492 0.004173 0.004777 0.005305 0.005756 0.00613 0.006427 0.006648 0.006792)
    CustomJoint patellofemoral_r: socket_parent_frame=femur_r_offset socket_child_frame=patella_r_offset
      Coordinate knee_angle_r_beta: default_value=0 range=(-99999.9 99999.9) clamped=false
      PhysicalOffsetFrame femur_r_offset: socket_parent=/bodyset/femur_r translation=(-0.00809 -0.40796 -0.00275)
      PhysicalOffsetFrame patella_r_offset: socket_parent=/bodyset/patella_r translation=(0 0 0)
      SpatialTransform: axes_held_at_zero=(rotation2 rotation3)
        TransformAxis rotation1: coordinates=knee_angle_r_beta axis=(0 0 1)
          SimmSpline: x=(0 0.174533 0.349066 0.523599 0.698132 0.872665 1.0472 1.22173 1.39626 1.5708 1.74533 1.91986 2.0944)
              y=(0.00113686 -0.00629212 -0.105582 -0.253683 -0.414245 -0.579047 -0.747244 -0.91799 -1.09044 -1.26379 -1.43763 -1.61186 -1.78634)
        TransformAxis translation1: coordinates=knee_angle_r_beta axis=(1 0 0)
          SimmSpline: x=(0 0.174533 0.349066 0.523599 0.698132 0.872665 1.0472 1.22173 1.39626 1.5708 1.74533 1.91986 2.0944)
              y=(0.0524 0.0488 0.0437 0.0371 0.0296 0.0216 0.0136 0.0057 -0.0019 -0.0088 -0.0148 -0.0196 -0.0227)
        TransformAxis translation2: coordinates=knee_angle_r_beta axis=(0 1 0)
          SimmSpline: x=(0 0.174533 0.349066 0.523599 0.698132 0.872665 1.0472 1.22173 1.39626 1.5708 1.74533 1.91986 2.0944)
              y=(-0.0108 -0.019 -0.0263 -0.0322 -0.0367 -0.0395 -0.0408 -0.0404 -0.0384 -0.0349 -0.0301 -0.0245 -0.0187)
        TransformAxis translation3: axis=(0 0 1) Constant(value=0.00275)
    PinJoint ankle_r: socket_parent_frame=tibia_r_offset socket_child_frame=talus_r_offset
      Coordinate ankle_angle_r: default_value=0 range=(-0.6981317 0.5235988) clamped=true
      PhysicalOffsetFrame tibia_r_offset: socket_parent=/bodyset/tibia_r translation=(-0.01 -0.4 0)
          orientation=(0.175895 -0.105208 0.0186622)
      PhysicalOffsetFrame talus_r_offset: socket_parent=/bodyset/talus_r translation=(0 0 0)
          orientation=(0.175895 -0.105208 0.0186622)
    PinJoint subtalar_r: socket_parent_frame=talus_r_offset socket_child_frame=calcn_r_offset
      Coordinate subtalar_angle_r: default_value=0 range=(-0.3490659 0.3490659) clamped=true locked=true
      PhysicalOffsetFrame talus_r_offset: socket_parent=/bodyset/talus_r translation=(-0.04877 -0.04195 0.00792)
          orientation=(-1.76819 0.906223 1.8196)
      PhysicalOffsetFrame calcn_r_offset: socket_parent=/bodyset/calcn_r translation=(0 0 0)
          orientation=(-1.76819 0.906223 1.8196)
    PinJoint mtp_r: socket_parent_frame=calcn_r_offset socket_child_frame=toes_r_offset
      Coordinate mtp_angle_r: default_value=0 range=(-0.5235988 0.5235988) clamped=true locked=true
      PhysicalOffsetFrame calcn_r_offset: socket_parent=/bodyset/calcn_r translation=(0.1788 -0.002 0.00108)
          orientation=(-3.14159 0.619901 0)
      PhysicalOffsetFrame toes_r_offset: socket_parent=/bodyset/toes_r translation=(0 0 0)
          orientation=(-3.14159 0.619901 0)
  ConstraintSet:
    CoordinateCouplerConstraint patellofemoral_knee_angle_r_con: independent_coordinate_names=knee_angle_r
        dependent_coordinate_name=knee_angle_r_beta scale_factor=1
        coupled_coordinates_function=LinearFunction(coefficients=1 0)
  ForceSet:
    Millard2012EquilibriumMuscle [values shared by the 7 below unless stated]: fiber_damping=0.1
        default_activation=0.01 minimum_activation=0.01
      ActiveForceLengthCurve: min_norm_active_fiber_length=0.4265549 transition_norm_fiber_length=0.7329039
          max_norm_active_fiber_length=1.602801 shallow_ascending_slope=0.5352831 minimum_value=0
      ForceVelocityCurve: concentric_slope_at_vmax=0 concentric_slope_near_vmax=0.2532315 isometric_slope=11.50763
          eccentric_slope_at_vmax=0 eccentric_slope_near_vmax=0.0636132 max_eccentric_velocity_force_multiplier=1.77782
          concentric_curviness=0.4944825 eccentric_curviness=0.9471672
      FiberForceLengthCurve: strain_at_zero_force=-0.02527331 strain_at_one_norm_force=0.5
          stiffness_at_low_force=0.09507338 stiffness_at_one_norm_force=9.993384 curviness=0.6951523
    Millard2012EquilibriumMuscle glmax12_ITB: max_isometric_force=455.9 optimal_fiber_length=0.1521
        tendon_slack_length=0.4225 pennation_angle_at_optimal=0.4590216 [radians]
      PathPoint P1: pelvis (-0.12078 0.01077 0.06086)
      PathPoint P2: femur_r (-0.04234 -0.14479 0.04314)
      PathPoint P3: femur_r (-0.03072 -0.21224 0.05326)
      PathPoint P4: tibia_r (-0.00334 -0.05211 0.03202)
      PathWrap: wrap_object=ITB_at_gtrochPost5 method=hybrid
      PathWrap pathwrap-1: wrap_object=greater_trochanter method=axial
      PathWrap pathwrap-2: wrap_object=Gmax_at_ischium method=hybrid
      PathWrap pathwrap-3: wrap_object=Gmax12_at_knee method=midpoint
      TendonForceLengthCurve: strain_at_one_norm_force=0.08707634 stiffness_at_one_norm_force=14.91251
          norm_force_at_toe_end=0.2986195 curviness=1
    Millard2012EquilibriumMuscle glmax34_ITB: max_isometric_force=558.6 optimal_fiber_length=0.1665
        tendon_slack_length=0.41 pennation_angle_at_optimal=0.4590216
      PathPoint P1: pelvis (-0.152 -0.03961 0.0157)
      PathPoint P2: pelvis (-0.14323 -0.09994 0.0494)
      PathPoint P3: femur_r (-0.04233 -0.16602 0.0303)
      PathPoint P4: tibia_r (-0.0137 -0.0647 0.03439)
      PathWrap: wrap_object=ITB_at_gtrochPost6 method=hybrid
      PathWrap pathwrap-1: wrap_object=Gmax_at_ischium2 method=hybrid
      PathWrap pathwrap-2: wrap_object=Gmax34_at_knee method=midpoint
      TendonForceLengthCurve: strain_at_one_norm_force=0.1100756 stiffness_at_one_norm_force=11.10746
          norm_force_at_toe_end=0.2242953 curviness=1
    Millard2012EquilibriumMuscle tfl12_ITB: max_isometric_force=195.2 optimal_fiber_length=0.0976
        tendon_slack_length=0.4258 pennation_angle_at_optimal=0.0436332
      PathPoint P1: pelvis (-0.01126 0.01202 0.13068)
      PathPoint P2: femur_r (0.00938 -0.37419 0.05322)
      PathPoint P3: tibia_r (0.01191 -0.03999 0.03853)
      PathWrap: wrap_object=ITB_at_gtrochAnt method=hybrid
      PathWrap pathwrap-1: wrap_object=TFL_at_knee method=hybrid
      TendonForceLengthCurve: strain_at_one_norm_force=0.0530452 stiffness_at_one_norm_force=30.30898
          norm_force_at_toe_end=0.6105872 curviness=1
    Millard2012EquilibriumMuscle glmax1: max_isometric_force=297.7 optimal_fiber_length=0.1473 tendon_slack_length=0.05
        pennation_angle_at_optimal=0.3829252
      PathPoint P1: pelvis (-0.1231 0.0345 0.0563)
      PathPoint P2: pelvis (-0.1257 -0.0242 0.0779)
      PathPoint P3: femur_r (-0.0475 -0.03416 0.02949)
      PathPoint P4: femur_r (-0.0358 -0.06238 0.04577)
      PathWrap: wrap_object=Gmax_at_pelvis method=hybrid
      TendonForceLengthCurve: strain_at_one_norm_force=0.03219887 stiffness_at_one_norm_force=38.89231
          norm_force_at_toe_end=0.235027 curviness=0.4770676
    Millard2012EquilibriumMuscle glmax2: max_isometric_force=191 optimal_fiber_length=0.1569 tendon_slack_length=0.0733
        pennation_angle_at_optimal=0.3829252
      PathPoint P1: pelvis (-0.1317 0.0087 0.0462)
      PathPoint P2: pelvis (-0.1344 -0.0609 0.0813)
      PathPoint P3: femur_r (-0.045 -0.0584 0.0252)
      PathPoint P4: femur_r (-0.0156 -0.1016 0.0419)
      PathWrap: wrap_object=Gmax_at_pelvis method=hybrid
      TendonForceLengthCurve: strain_at_one_norm_force=0.03219887 stiffness_at_one_norm_force=38.89231
          norm_force_at_toe_end=0.235027 curviness=0.4770676
    Millard2012EquilibriumMuscle glmax3: max_isometric_force=216.1 optimal_fiber_length=0.1665
        tendon_slack_length=0.065 pennation_angle_at_optimal=0.3829252
      PathPoint P1: pelvis (-0.12982 -0.03111 0.02294)
      PathPoint P2: pelvis (-0.12782 -0.10399 0.06369)
      PathPoint P3: femur_r (-0.03156 -0.10208 0.01854)
      PathPoint P4: femur_r (-0.00962 -0.12064 0.03584)
      PathWrap: wrap_object=Gmax_at_pelvis method=hybrid
      TendonForceLengthCurve: strain_at_one_norm_force=0.03219887 stiffness_at_one_norm_force=38.89231
          norm_force_at_toe_end=0.235027 curviness=0.4770676
    Millard2012EquilibriumMuscle glmax4: max_isometric_force=141 optimal_fiber_length=0.1665 tendon_slack_length=0.0702
        pennation_angle_at_optimal=0.3829252
      PathPoint P1: pelvis (-0.13 -0.0525 0.009)
      PathPoint P2: pelvis (-0.1273 -0.1263 0.0435)
      PathPoint P3: femur_r (-0.0281 -0.1125 0.0094)
      PathPoint P4: femur_r (-0.006 -0.1419 0.0411)
      PathWrap: wrap_object=Gmax_at_pelvis method=hybrid
      TendonForceLengthCurve: strain_at_one_norm_force=0.03219887 stiffness_at_one_norm_force=38.89231
          norm_force_at_toe_end=0.235027 curviness=0.4770676
